# OpenSim document version 40000
AnalyzeTool analysis_subject01_walk2:
  model_file: subject01.osim
  replace_force_set: false
  results_directory: Analysis
  output_precision: 8
  initial_time: 3.38
  final_time: 4.49
  solve_for_equilibrium_for_auxiliary_states: false
  maximum_number_of_integrator_steps: 20000
  maximum_integrator_step_size: 1
  minimum_integrator_step_size: 1e-8
  integrator_error_tolerance: 1e-5
  external_loads_file: external_loads.xml
  coordinates_file: coordinates.sto
  AnalysisSet Analyses:
    BodyKinematics: start_time=3.38 end_time=4.49 step_interval=1 in_degrees=false bodies=center_of_mass
        express_results_in_body_local_frame=false
