# OpenSim document version 40000
ExternalLoads @SUBJECT@_walk2_external_loads:
  datafile: grf.mot
  ExternalForce [values shared by the 12 below unless stated]: force_expressed_in_body=ground
      point_expressed_in_body=ground
  ExternalForce ExternalForce_RightHeel: applied_to_body=calcn_r force_identifier=heel_r_force_v
      point_identifier=heel_r_force_p torque_identifier=heel_r_torque_
  ExternalForce ExternalForce_LeftHeel: applied_to_body=calcn_l force_identifier=heel_l_force_v
      point_identifier=heel_l_force_p torque_identifier=heel_l_torque_
  ExternalForce ExternalForce_RightLateralRear: applied_to_body=calcn_r force_identifier=lat_rear_r_force_v
      point_identifier=lat_rear_r_force_p torque_identifier=lat_rear_r_torque_
  ExternalForce ExternalForce_LeftLateralRear: applied_to_body=calcn_l force_identifier=lat_rear_l_force_v
      point_identifier=lat_rear_l_force_p torque_identifier=lat_rear_l_torque_
  ExternalForce ExternalForce_RightLateralMid: applied_to_body=calcn_r force_identifier=lat_mid_r_force_v
      point_identifier=lat_mid_r_force_p torque_identifier=lat_mid_r_torque_
  ExternalForce ExternalForce_LeftLateralMid: applied_to_body=calcn_l force_identifier=lat_mid_l_force_v
      point_identifier=lat_mid_l_force_p torque_identifier=lat_mid_l_torque_
  ExternalForce ExternalForce_RightMedialMid: applied_to_body=calcn_r force_identifier=med_mid_r_force_v
      point_identifier=med_mid_r_force_p torque_identifier=med_mid_r_torque_
  ExternalForce ExternalForce_LeftMedialMid: applied_to_body=calcn_l force_identifier=med_mid_l_force_v
      point_identifier=med_mid_l_force_p torque_identifier=med_mid_l_torque_
  ExternalForce ExternalForce_RightLateralToe: applied_to_body=toes_r force_identifier=lat_toe_r_force_v
      point_identifier=lat_toe_r_force_p torque_identifier=lat_toe_r_torque_
  ExternalForce ExternalForce_LeftLateralToe: applied_to_body=toes_l force_identifier=lat_toe_l_force_v
      point_identifier=lat_toe_l_force_p torque_identifier=lat_toe_l_torque_
  ExternalForce ExternalForce_RightMedialToe: applied_to_body=toes_r force_identifier=med_toe_r_force_v
      point_identifier=med_toe_r_force_p torque_identifier=med_toe_r_torque_
  ExternalForce ExternalForce_LeftMedialToe: applied_to_body=toes_l force_identifier=med_toe_l_force_v
      point_identifier=med_toe_l_force_p torque_identifier=med_toe_l_torque_
