# OpenSim document version 40000
AnalyzeTool analysis_@TRIAL@:
  model_file: @MODEL@
  replace_force_set: false
  results_directory: @RESULTS_DIR@
  output_precision: 8
  initial_time: @START_TIME@
  final_time: @END_TIME@
  solve_for_equilibrium_for_auxiliary_states: false
  maximum_number_of_integrator_steps: 20000
  maximum_integrator_step_size: 1
  minimum_integrator_step_size: 1e-8
  integrator_error_tolerance: 1e-5
  external_loads_file: @EXT_LOADS@
  coordinates_file: @COORDINATES@
  AnalysisSet Analyses:
    BodyKinematics: start_time=@START_TIME@ end_time=@END_TIME@ step_interval=1 in_degrees=false bodies=center_of_mass
        express_results_in_body_local_frame=false
