# OpenSim document version 40000
InverseKinematicsTool run500:
  model_file: ../Models/optimized_scale_and_markers.osim
  marker_file: ../MarkerData/run500.trc
  output_motion_file: run500_ik_by_opensim.mot
  accuracy: 1e-5
  report_errors: true
  IKTaskSet IK_tasks:
    IKMarkerTask C7: weight=1 apply=true
    IKMarkerTask CLAV: weight=1 apply=true
    IKMarkerTask LACR: weight=1 apply=true
    IKMarkerTask LAJC: weight=1 apply=true
    IKMarkerTask LASH: weight=1 apply=true
    IKMarkerTask LASI: weight=1 apply=true
    IKMarkerTask LCAL: weight=1 apply=true
    IKMarkerTask LEJC: weight=1 apply=true
    IKMarkerTask LFAradius: weight=1 apply=true
    IKMarkerTask LFAsuperior: weight=1 apply=true
    IKMarkerTask LFAulna: weight=1 apply=true
    IKMarkerTask LHJC: weight=1 apply=true
    IKMarkerTask LKJC: weight=1 apply=true
    IKMarkerTask LLEL: weight=1 apply=true
    IKMarkerTask LLFC: weight=1 apply=true
    IKMarkerTask LLMAL: weight=1 apply=true
    IKMarkerTask LMEL: weight=1 apply=true
    IKMarkerTask LMFC: weight=1 apply=true
    IKMarkerTask LMMAL: weight=1 apply=true
    IKMarkerTask LMT5: weight=1 apply=true
    IKMarkerTask LPSH: weight=1 apply=true
    IKMarkerTask LPSI: weight=1 apply=true
    IKMarkerTask LSJC: weight=1 apply=true
    IKMarkerTask LTB1: weight=1 apply=true
    IKMarkerTask LTB2: weight=1 apply=true
    IKMarkerTask LTB3: weight=1 apply=true
    IKMarkerTask LTH1: weight=1 apply=true
    IKMarkerTask LTH2: weight=1 apply=true
    IKMarkerTask LTH3: weight=1 apply=true
    IKMarkerTask LTOE: weight=1 apply=true
    IKMarkerTask LUA1: weight=1 apply=true
    IKMarkerTask LUA2: weight=1 apply=true
    IKMarkerTask LUA3: weight=1 apply=true
    IKMarkerTask RACR: weight=1 apply=true
    IKMarkerTask RAJC: weight=1 apply=true
    IKMarkerTask RASH: weight=1 apply=true
    IKMarkerTask RASI: weight=1 apply=true
    IKMarkerTask RCAL: weight=1 apply=true
    IKMarkerTask REJC: weight=1 apply=true
    IKMarkerTask RFAradius: weight=1 apply=true
    IKMarkerTask RFAsuperior: weight=1 apply=true
    IKMarkerTask RFAulna: weight=1 apply=true
    IKMarkerTask RHJC: weight=1 apply=true
    IKMarkerTask RKJC: weight=1 apply=true
    IKMarkerTask RLEL: weight=1 apply=true
    IKMarkerTask RLFC: weight=1 apply=true
    IKMarkerTask RLMAL: weight=1 apply=true
    IKMarkerTask RMEL: weight=1 apply=true
    IKMarkerTask RMFC: weight=1 apply=true
    IKMarkerTask RMMAL: weight=1 apply=true
    IKMarkerTask RMT5: weight=1 apply=true
    IKMarkerTask RPSH: weight=1 apply=true
    IKMarkerTask RPSI: weight=1 apply=true
    IKMarkerTask RSJC: weight=1 apply=true
    IKMarkerTask RTB1: weight=1 apply=true
    IKMarkerTask RTB2: weight=1 apply=true
    IKMarkerTask RTB3: weight=1 apply=true
    IKMarkerTask RTH1: weight=1 apply=true
    IKMarkerTask RTH2: weight=1 apply=true
    IKMarkerTask RTH3: weight=1 apply=true
    IKMarkerTask RTOE: weight=1 apply=true
    IKMarkerTask RUA1: weight=1 apply=true
    IKMarkerTask RUA2: weight=1 apply=true
    IKMarkerTask RUA3: weight=1 apply=true
