# OpenSim document version 10600
# Copyright (c) 2013, Stanford University
# Permission is hereby granted, free of charge, to any person obtaining a copy of this software and associated documentation files (the "Software"), to deal in the Software without restriction, including without limitation the rights to use, copy, modify, merge, publish, distribute, sublicense, and/or sell copies of the Software, and to permit persons to whom the Software is furnished to do so, subject to the following conditions:
# The above copyright notice and this permission notice shall be included in all copies or substantial portions of the Software.
# THE SOFTWARE IS PROVIDED "AS IS", WITHOUT WARRANTY OF ANY KIND, EXPRESS OR IMPLIED, INCLUDING BUT NOT LIMITED TO THE WARRANTIES OF MERCHANTABILITY, FITNESS FOR A PARTICULAR PURPOSE AND NONINFRINGEMENT. IN NO EVENT SHALL THE AUTHORS OR COPYRIGHT HOLDERS BE LIABLE FOR ANY CLAIM, DAMAGES OR OTHER LIABILITY, WHETHER IN AN ACTION OF CONTRACT, TORT OR OTHERWISE, ARISING FROM, OUT OF OR IN CONNECTION WITH THE SOFTWARE OR THE USE OR OTHER DEALINGS IN THE
# SOFTWARE.
# Please cite: Hamner, S.R., Delp, S.L. (2013) Muscle contributions to fore-aft and vertical body mass center accelerations
# over a range of running speeds. Journal of Biomechanics, vol 46, pp 780-787.
Model subject19_scaled:
  length_units: meters
  force_units: N
  credits:
    Delp S.L., Loan J.P., Hoy M.G., Zajac F.E., Topp E.L., Rosen J.M., Thelen D.G., Anderson F.C., Seth A., Hamner S.R.
  publications:
    Notes: 3D, 23 DOF gait model created by D.G. Thelen, Univ. of Wisconsin-Madison, and Samuel Hamner, Ajay Seth, Frank C. Anderson, and Scott L. Delp, Stanford University. Lower extremity joint defintions based on Delp et al. (1990). Low back joint and anthropometry based on Anderson and Pandy (1999, 2001). Planar knee model of Yamaguchi and Zajac (1989). Seth removed the patella to avoid kinematic constraints; insertions of the quadrucepts are handled with moving points in the tibia frame. Hamner added arms adapted from Holzbaur et al., 2005.
    Hamner, S.R., Seth, A, Delp, S.L.: Muscle contributions to propulsion and support during running. Journal of Biomechanics, 2010.
    Delp, S.L., Loan, J.P., Hoy, M.G., Zajac, F.E., Topp E.L., Rosen, J.M.: An interactive graphics-based model of the lower extremity to study orthopaedic surgical procedures, IEEE Transactions on Biomedical Engineering, vol. 37, pp. 757-767, 1990.
    Yamaguchi G.T., Zajac F.E.: A planar model of the knee joint to characterize the knee extensor mechanism." J . Biomech. vol. 21. pp. 1-10. 1989.
    Anderson F.C., Pandy M.G.: A dynamic optimization solution for vertical jumping in three dimensions. Computer Methods in Biomechanics and Biomedical Engineering 2:201-231, 1999.
    Anderson F.C., Pandy M.G.: Dynamic optimization of human walking. Journal of Biomechanical Engineering 123:381-390, 2001.
    Holzbaur, KR, WM Murray and SL Delp, 2005. A model of the upper extremity for simulating musculoskeletal surgery and analyzing neuromuscular control. Ann Biomed Eng 33(6): 829-840.
  defaults: Thelen2003Muscle default: muscle_model=9 max_isometric_force=546 optimal_fiber_length=0.0535
      tendon_slack_length=0.078 pennation_angle=0 activation_time_constant=0.01 deactivation_time_constant=0.04 Vmax=10
      Vmax0=5 FmaxTendonStrain=0.033 FmaxMuscleStrain=0.6 KshapeActive=0.5 KshapePassive=4 damping=0.05 Af=0.3 Flen=1.8
  DynamicsEngine:
    SimbodyEngine default: gravity=(0 -9.80665 0)
      BodySet:
        Body ground: mass=0 mass_center=(0 0 0) inertia_xx=0 inertia_yy=0 inertia_zz=0
        Body pelvis: mass=10.20567 mass_center=(-0.06323362 0 0) inertia_xx=0.08296985 inertia_yy=0.08296985
            inertia_zz=0.03712399 meshes=(sacrum.vtp pelvis.vtp l_pelvis.vtp)
          CustomJoint ground_pelvis: parent_body=ground location_in_parent=(0 0 0) location=(0 0 0)
            Coordinate pelvis_tilt: default_value=0 initial_value=0 tolerance=0.00000001 stiffness=0
                range=(-3.141593 3.141593) keys=q_key clamped=true restraint_active=false
            Coordinate pelvis_list: default_value=0 initial_value=0 tolerance=0.00000001 stiffness=0
                range=(-3.141593 3.141593) keys=q_key clamped=true restraint_active=false
            Coordinate pelvis_rotation: default_value=0 initial_value=0 tolerance=0.00000001 stiffness=0
                range=(-3.141593 3.141593) keys=q_key clamped=true restraint_active=false
            Coordinate pelvis_tx: default_value=0 initial_value=0 tolerance=0.00000001 stiffness=0 range=(-10 10)
                keys=p_key clamped=true restraint_active=false
            Coordinate pelvis_ty: default_value=0 initial_value=0 tolerance=0.00000001 stiffness=0 range=(-10 10)
                keys=q_key clamped=true restraint_active=false
            Coordinate pelvis_tz: default_value=0 initial_value=0 tolerance=0.00000001 stiffness=0 range=(-10 10)
                keys=q_key clamped=true restraint_active=false
            TransformAxis tx: coordinate=pelvis_tx is_rotation=false axis=(1 0 0)
            TransformAxis ty: coordinate=pelvis_ty is_rotation=false axis=(0 1 0)
            TransformAxis tz: coordinate=pelvis_tz is_rotation=false axis=(0 0 1)
            TransformAxis r1: coordinate=pelvis_tilt axis=(0 0 1)
            TransformAxis r2: coordinate=pelvis_list axis=(1 0 0)
            TransformAxis r3: coordinate=pelvis_rotation axis=(0 1 0)
        Body femur_r: mass=8.060373 mass_center=(0 -0.1832912 0) inertia_xx=0.1348878 inertia_yy=0.03535894
            inertia_zz=0.1422417 meshes=femur_r.vtp
          CustomJoint hip_r: parent_body=pelvis location_in_parent=(-0.06323362 -0.05468172 0.08376782)
              location=(0 0 0)
            Coordinate hip_flexion_r: default_value=0 initial_value=0 tolerance=0.00000001 stiffness=0
                range=(-2.094395 2.094395) keys=(h_key leftmouse_button) clamped=true restraint_active=false
            Coordinate hip_adduction_r: default_value=0 initial_value=0 tolerance=0.00000001 stiffness=0
                range=(-2.094395 2.094395) keys=(h_key leftmouse_button) clamped=true restraint_active=false
            Coordinate hip_rotation_r: default_value=0 initial_value=0 tolerance=0.00000001 stiffness=0
                range=(-2.094395 2.094395) keys=(h_key leftmouse_button) clamped=true restraint_active=false
            TransformAxis r1: coordinate=hip_flexion_r axis=(0 0 1)
            TransformAxis r2: coordinate=hip_adduction_r axis=(1 0 0)
            TransformAxis r3: coordinate=hip_rotation_r axis=(0 1 0)
        Body tibia_r: mass=3.212832 mass_center=(0 -0.2019275 0) inertia_xx=0.05109043 inertia_yy=0.00516987
            inertia_zz=0.05180002 meshes=(tibia_r.vtp fibula_r.vtp)
          CustomJoint knee_r: parent_body=femur_r location_in_parent=(0 0 0) location=(0 0 0)
            Coordinate knee_angle_r: default_value=0 initial_value=0 tolerance=0.00000001 stiffness=0
                range=(-2.792527 0.1745329) keys=k_key clamped=true restraint_active=false
            TransformAxis tx: coordinate=knee_angle_r is_rotation=false axis=(1 0 0)
              natCubicSpline: min_x=-1000000000000000000000000000000 max_x=1000000000000000000000000000000
                  min_y=-1000000000000000000000000000000 max_y=1000000000000000000000000000000
                  min_z=-1000000000000000000000000000000 max_z=1000000000000000000000000000000
                  x=(-2.094395 -1.745329 -1.396263 -1.047198 -0.6981317 -0.3490659 -0.1745329 0.1973442 0.337395 0.4901776 1.52146 2.094395)
                  y=(-0.00345019 0.00192995 0.00443133 0.00442055 0.00228575 -0.00107818 -0.00334237 -0.00563566 -0.00585993 -0.00600979 -0.00585993 -0.00566046)
            TransformAxis ty: coordinate=knee_angle_r is_rotation=false axis=(0 1 0)
              natCubicSpline: min_x=-1000000000000000000000000000000 max_x=1000000000000000000000000000000
                  min_y=-1000000000000000000000000000000 max_y=1000000000000000000000000000000
                  min_z=-1000000000000000000000000000000 max_z=1000000000000000000000000000000
                  x=(-2.094395 -1.22173 -0.5235988 -0.3490659 -0.1745329 0.1591486 2.094395)
                  y=(-0.4556403 -0.4401145 -0.4301952 -0.4286857 -0.4276075 -0.4261671 -0.4269606)
            TransformAxis r1: coordinate=knee_angle_r axis=(0 0 1)
        Body talus_r: mass=0.08665763 mass_center=(0 0 0) inertia_xx=0.00100769 inertia_yy=0.00100769
            inertia_zz=0.00100769 meshes=talus_rv.vtp
          CustomJoint ankle_r: parent_body=tibia_r location_in_parent=(0 -0.4650713 0) location=(0 0 0)
            Coordinate ankle_angle_r: default_value=0 initial_value=0 tolerance=0.00000001 stiffness=0
                range=(-1.570796 1.570796) keys=a_key clamped=true restraint_active=false
            TransformAxis r1: coordinate=ankle_angle_r axis=(-0.1050135 -0.1740224 0.9791263)
        Body calcn_r: mass=1.08322 mass_center=(0.1078351 0.03235054 0) inertia_xx=0.00141077 inertia_yy=0.00392999
            inertia_zz=0.00413153 meshes=foot.vtp
          CustomJoint subtalar_r: parent_body=talus_r location_in_parent=(-0.05259119 -0.04523684 0.00854054)
              location=(0 0 0)
            Coordinate subtalar_angle_r: default_value=0 initial_value=0 tolerance=0.00000001 stiffness=0
                range=(-1.570796 1.570796) keys=a_key clamped=true locked=true restraint_active=false
            TransformAxis r1: coordinate=subtalar_angle_r axis=(0.7871796 0.6047475 -0.1209495)
        Body toes_r: mass=0.1877004 mass_center=(0.03731096 0.00647011 -0.01887115) inertia_xx=0.00010077
            inertia_yy=0.00020154 inertia_zz=0.00100769 meshes=bofoot.vtp
          CustomJoint mtp_r: parent_body=calcn_r location_in_parent=(0.1928092 -0.0021567 0.00116462) location=(0 0 0)
            Coordinate mtp_angle_r: default_value=0 initial_value=0 tolerance=0.00000001 stiffness=0
                range=(-1.570796 1.570796) keys=t_key clamped=true locked=true restraint_active=false
            TransformAxis r1: coordinate=mtp_angle_r axis=(-0.5809544 0 0.8139361)
        Body femur_l: mass=8.060373 mass_center=(0 -0.1832912 0) inertia_xx=0.1348878 inertia_yy=0.03535894
            inertia_zz=0.1422417 meshes=femur_l.vtp
          CustomJoint hip_l: parent_body=pelvis location_in_parent=(-0.06323362 -0.05468172 -0.08376782)
              location=(0 0 0)
            Coordinate hip_flexion_l: default_value=0 initial_value=0 tolerance=0.00000001 stiffness=0
                range=(-2.094395 2.094395) keys=(h_key leftmouse_button) clamped=true restraint_active=false
            Coordinate hip_adduction_l: default_value=0 initial_value=0 tolerance=0.00000001 stiffness=0
                range=(-2.094395 2.094395) keys=(h_key leftmouse_button) clamped=true restraint_active=false
            Coordinate hip_rotation_l: default_value=0 initial_value=0 tolerance=0.00000001 stiffness=0
                range=(-2.094395 2.094395) keys=(h_key leftmouse_button) clamped=true restraint_active=false
            TransformAxis r1: coordinate=hip_flexion_l axis=(0 0 1)
            TransformAxis r2: coordinate=hip_adduction_l axis=(-1 0 0)
            TransformAxis r3: coordinate=hip_rotation_l axis=(0 -1 0)
        Body tibia_l: mass=3.212832 mass_center=(0 -0.2019275 0) inertia_xx=0.05075935 inertia_yy=0.00450769
            inertia_zz=0.05075935 meshes=(tibia_l.vtp fibula_l.vtp)
          CustomJoint knee_l: parent_body=femur_l location_in_parent=(0 0 0) location=(0 0 0)
            Coordinate knee_angle_l: default_value=0 initial_value=0 tolerance=0.00000001 stiffness=0
                range=(-2.792527 0.1745329) keys=k_key clamped=true restraint_active=false
            TransformAxis tx: coordinate=knee_angle_l is_rotation=false axis=(1 0 0)
              natCubicSpline: min_x=-1000000000000000000000000000000 max_x=1000000000000000000000000000000
                  min_y=-1000000000000000000000000000000 max_y=1000000000000000000000000000000
                  min_z=-1000000000000000000000000000000 max_z=1000000000000000000000000000000
                  x=(-2.094395 -1.745329 -1.396263 -1.047198 -0.6981317 -0.3490659 -0.1745329 0.1973442 0.337395 0.4901776 1.52146 2.094395)
                  y=(-0.00345019 0.00192995 0.00443133 0.00442055 0.00228575 -0.00107818 -0.00334237 -0.00563566 -0.00585993 -0.00600979 -0.00585993 -0.00566046)
            TransformAxis ty: coordinate=knee_angle_l is_rotation=false axis=(0 1 0)
              natCubicSpline: min_x=-1000000000000000000000000000000 max_x=1000000000000000000000000000000
                  min_y=-1000000000000000000000000000000 max_y=1000000000000000000000000000000
                  min_z=-1000000000000000000000000000000 max_z=1000000000000000000000000000000
                  x=(-2.094395 -1.22173 -0.5235988 -0.3490659 -0.1745329 0.1591486 2.094395)
                  y=(-0.4556403 -0.4401145 -0.4301952 -0.4286857 -0.4276075 -0.4261671 -0.4269606)
            TransformAxis r1: coordinate=knee_angle_l axis=(0 0 1)
        Body talus_l: mass=0.08665763 mass_center=(0 0 0) inertia_xx=0.00100769 inertia_yy=0.00100769
            inertia_zz=0.00100769 meshes=talus_lv.vtp
          CustomJoint ankle_l: parent_body=tibia_l location_in_parent=(0 -0.4650713 0) location=(0 0 0)
            Coordinate ankle_angle_l: default_value=0 initial_value=0 tolerance=0.00000001 stiffness=0
                range=(-1.570796 1.570796) keys=a_key clamped=true restraint_active=false
            TransformAxis r1: coordinate=ankle_angle_l axis=(0.1050135 0.1740224 0.9791263)
        Body calcn_l: mass=1.08322 mass_center=(0.1078351 0.03235054 0) inertia_xx=0.00141077 inertia_yy=0.00392999
            inertia_zz=0.00413153 meshes=l_foot.vtp
          CustomJoint subtalar_l: parent_body=talus_l location_in_parent=(-0.05259119 -0.04523684 -0.00854054)
              location=(0 0 0)
            Coordinate subtalar_angle_l: default_value=0 initial_value=0 tolerance=0.00000001 stiffness=0
                range=(-1.570796 1.570796) keys=a_key clamped=true locked=true restraint_active=false
            TransformAxis r1: coordinate=subtalar_angle_l axis=(-0.7871796 -0.6047475 -0.1209495)
        Body toes_l: mass=0.1877004 mass_center=(0.03731096 0.00647011 0.01887115) inertia_xx=0.00010077
            inertia_yy=0.00020154 inertia_zz=0.00100769 meshes=l_bofoot.vtp
          CustomJoint mtp_l: parent_body=calcn_l location_in_parent=(0.1928092 -0.0021567 -0.00116462) location=(0 0 0)
            Coordinate mtp_angle_l: default_value=0 initial_value=0 tolerance=0.00000001 stiffness=0
                range=(-1.047198 1.047198) keys=t_key clamped=true locked=true restraint_active=false
            TransformAxis r1: coordinate=mtp_angle_l axis=(0.5809544 0 0.8139361)
        Body torso: mass=23.2473 mass_center=(0.03349157 0.3222464 0.006687052) inertia_xx=1.29577 inertia_yy=0.6639227
            inertia_zz=1.257894 meshes=(hat_spine.vtp hat_jaw.vtp hat_skull.vtp hat_ribs_scap.vtp)
          CustomJoint back: parent_body=pelvis location_in_parent=(-0.09006542 0.06742148 0) location=(0 0 0)
            Coordinate lumbar_extension: default_value=0 initial_value=0 tolerance=0.00000001 stiffness=0
                range=(-1.570796 1.570796) keys=q_key clamped=true restraint_active=false
            Coordinate lumbar_bending: default_value=0 initial_value=0 tolerance=0.00000001 stiffness=0
                range=(-1.570796 1.570796) keys=q_key clamped=true restraint_active=false
            Coordinate lumbar_rotation: default_value=0 initial_value=0 tolerance=0.00000001 stiffness=0
                range=(-1.570796 1.570796) keys=q_key clamped=true restraint_active=false
            TransformAxis r1: coordinate=lumbar_extension axis=(0 0 1)
            TransformAxis r2: coordinate=lumbar_bending axis=(1 0 0)
            TransformAxis r3: coordinate=lumbar_rotation axis=(0 1 0)
        Body humerus_r: mass=1.761316 mass_center=(0 -0.1559756 0) inertia_xx=0.0093068 inertia_yy=0.00321056
            inertia_zz=0.01044658 meshes=humerus_rv.vtp
          CustomJoint acromial_r: parent_body=torso location_in_parent=(0.00317715 0.3741079 0.1711934)
              location=(0 0 0)
            Coordinate arm_flex_r: default_value=0 initial_value=0 tolerance=0.00000001 stiffness=0
                range=(-1.570796 1.570796) clamped=true restraint_active=false
            Coordinate arm_add_r: default_value=0 initial_value=0 tolerance=0.00000001 stiffness=0
                range=(-2.094395 1.570796) clamped=true restraint_active=false
            Coordinate arm_rot_r: default_value=0 initial_value=0 tolerance=0.00000001 stiffness=0
                range=(-1.570796 1.570796) clamped=true restraint_active=false
            TransformAxis r1: coordinate=arm_flex_r axis=(0 0 1)
            TransformAxis r2: coordinate=arm_add_r axis=(1 0 0)
            TransformAxis r3: coordinate=arm_rot_r axis=(0 1 0)
        Body ulna_r: mass=0.5264451 mass_center=(0 -0.1295086 0) inertia_xx=0.0029637 inertia_yy=0.00061836
            inertia_zz=0.00321485 meshes=ulna_rv.vtp
          CustomJoint elbow_r: parent_body=humerus_r location_in_parent=(0.01246273 -0.271435 -0.00909768)
              location=(0 0 0)
            Coordinate elbow_flex_r: default_value=0 initial_value=0 tolerance=0.00000001 stiffness=0 range=(0 2.618)
                clamped=true restraint_active=false
            TransformAxis r1: coordinate=elbow_flex_r axis=(0.226047 0.022269 0.9738618)
        Body radius_r: mass=0.5264451 mass_center=(0 -0.1295086 0) inertia_xx=0.0029637 inertia_yy=0.00061836
            inertia_zz=0.00321485 meshes=radius_rv.vtp
          CustomJoint radioulnar_r: parent_body=ulna_r location_in_parent=(-0.00722841 -0.01397651 0.02802716)
              location=(0 0 0)
            Coordinate pro_sup_r: default_value=0 initial_value=0 tolerance=0.00000001 stiffness=0 range=(0 3.141593)
                clamped=true restraint_active=false
            TransformAxis r1: coordinate=pro_sup_r axis=(0.05639803 0.9984065 0.001952)
        Body hand_r: mass=0.3964587 mass_center=(0 -0.07317062 0) inertia_xx=0.00089251 inertia_yy=0.00054731
            inertia_zz=0.00134077
            meshes=(pisiform_rvs.vtp lunate_rvs.vtp scaphoid_rvs.vtp triquetrum_rvs.vtp hamate_rvs.vtp capitate_rvs.vtp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)
          CustomJoint radius_hand_r: parent_body=radius_r location_in_parent=(-0.00945271 -0.25342 0.01462445)
              location=(0 0 0)
            Coordinate wrist_flex_r: default_value=0 initial_value=0 tolerance=0.00000001 stiffness=0
                range=(-1.22173 1.22173) clamped=true locked=true restraint_active=false
            Coordinate wrist_dev_r: default_value=0 initial_value=0 tolerance=0.00000001 stiffness=0
                range=(-0.4363323 0.6108652) clamped=true locked=true restraint_active=false
            TransformAxis r1: coordinate=wrist_flex_r axis=(0 0 1)
            TransformAxis r2: coordinate=wrist_dev_r axis=(1 0 0)
        Body humerus_l: mass=1.761316 mass_center=(0 -0.1559756 0) inertia_xx=0.0093068 inertia_yy=0.00321056
            inertia_zz=0.01044658 meshes=humerus_lv.vtp
          CustomJoint acromial_l: parent_body=torso location_in_parent=(0.00317715 0.3741079 -0.1711934)
              location=(0 0 0)
            Coordinate arm_flex_l: default_value=0 initial_value=0 tolerance=0.00000001 stiffness=0
                range=(-1.570796 1.570796) clamped=true restraint_active=false
            Coordinate arm_add_l: default_value=0 initial_value=0 tolerance=0.00000001 stiffness=0
                range=(-2.094395 1.570796) clamped=true restraint_active=false
            Coordinate arm_rot_l: default_value=0 initial_value=0 tolerance=0.00000001 stiffness=0
                range=(-1.570796 1.570796) clamped=true restraint_active=false
            TransformAxis r1: coordinate=arm_flex_l axis=(0 0 1)
            TransformAxis r2: coordinate=arm_add_l axis=(-1 0 0)
            TransformAxis r3: coordinate=arm_rot_l axis=(0 -1 0)
        Body ulna_l: mass=0.5264451 mass_center=(0 -0.1295086 0) inertia_xx=0.0029637 inertia_yy=0.00061836
            inertia_zz=0.00321485 meshes=ulna_lv.vtp
          CustomJoint elbow_l: parent_body=humerus_l location_in_parent=(0.01246273 -0.271435 0.00909768)
              location=(0 0 0)
            Coordinate elbow_flex_l: default_value=0 initial_value=0 tolerance=0.00000001 stiffness=0 range=(0 2.618)
                clamped=true restraint_active=false
            TransformAxis r1: coordinate=elbow_flex_l axis=(-0.226047 -0.022269 0.9738618)
        Body radius_l: mass=0.5264451 mass_center=(0 -0.1295086 0) inertia_xx=0.0029637 inertia_yy=0.00061836
            inertia_zz=0.00321485 meshes=radius_lv.vtp
          CustomJoint radioulnar_l: parent_body=ulna_l location_in_parent=(-0.00722841 -0.01397651 -0.02802716)
              location=(0 0 0)
            Coordinate pro_sup_l: default_value=0 initial_value=0 tolerance=0.00000001 stiffness=0 range=(0 3.141593)
                clamped=true restraint_active=false
            TransformAxis r1: coordinate=pro_sup_l axis=(-0.05639803 -0.9984065 0.001952)
        Body hand_l: mass=0.3964587 mass_center=(0 -0.07317062 0) inertia_xx=0.00089251 inertia_yy=0.00054731
            inertia_zz=0.00134077
            meshes=(pisiform_lvs.vtp lunate_lvs.vtp scaphoid_lvs.vtp triquetrum_lvs.vtp hamate_lvs.vtp capitate_lvs.vtp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)
          CustomJoint radius_hand_l: parent_body=radius_l location_in_parent=(-0.00945271 -0.25342 -0.01462445)
              location=(0 0 0)
            Coordinate wrist_flex_l: default_value=0 initial_value=0 tolerance=0.00000001 stiffness=0
                range=(-1.22173 1.22173) clamped=true locked=true restraint_active=false
            Coordinate wrist_dev_l: default_value=0 initial_value=0 tolerance=0.00000001 stiffness=0
                range=(-0.4363323 0.6108652) clamped=true locked=true restraint_active=false
            TransformAxis r1: coordinate=wrist_flex_l axis=(0 0 1)
            TransformAxis r2: coordinate=wrist_dev_l axis=(-1 0 0)
      MarkerSet:
        Marker RACR: torso (-0.03169093 0.4199807 0.1564085)
        Marker LACR: torso (-0.03287163 0.4349595 -0.158757)
        Marker C7: torso (-0.0493118 0.4390198 -0.00447221)
        Marker CLAV: torso (0.07151578 0.3747436 0.02212404)
        Marker RASH: torso (0.04203576 0.3902832 0.145968)
        Marker RPSH: torso (-0.07628955 0.3812327 0.150591)
        Marker LASH: torso (0.0406397 0.406749 -0.1393865)
        Marker LPSH: torso (-0.07523283 0.3882284 -0.1563223)
        Marker RUA1: humerus_r (-0.01735273 -0.04577421 0.05130249)
        Marker RUA2: humerus_r (0.03617682 -0.1043812 0.01370967)
        Marker RUA3: humerus_r (-0.03406762 -0.1511847 0.0235238)
        Marker RLEL: humerus_r (0.01269862 -0.2593127 0.02961726)
        Marker RMEL: humerus_r (-0.00320862 -0.2548316 -0.03213622)
        Marker RFAsuperior: ulna_r (0.04606906 -0.07856908 0.04565544)
        Marker RFAradius: radius_r (-0.00237808 -0.2513619 0.04813755)
        Marker RFAulna: radius_r (-0.02240132 -0.2392286 -0.01612622)
        Marker LUA1: humerus_l (-0.02723518 -0.04785438 -0.05633072)
        Marker LUA2: humerus_l (-0.05096761 -0.0986046 -0.00162756)
        Marker LUA3: humerus_l (0.0222462 -0.1414856 -0.03966924)
        Marker LLEL: humerus_l (0.01122026 -0.2609844 -0.02816728)
        Marker LMEL: humerus_l (-0.00687521 -0.2527099 0.03290572)
        Marker LFAsuperior: ulna_l (0.03406705 -0.06667701 -0.05249134)
        Marker LFAradius: radius_l (-0.00254036 -0.2523032 -0.04863766)
        Marker LFAulna: radius_l (-0.02344917 -0.2433019 0.01672667)
        Marker RASI: pelvis (0.00185028 0.00184558 0.1225333)
        Marker LASI: pelvis (0.00327966 0.00522796 -0.1168752)
        Marker RPSI: pelvis (-0.165739 0.02683781 0.04575089)
        Marker LPSI: pelvis (-0.1659425 0.02943574 -0.05179359)
        Marker LHJC: femur_l (0.00369258 -0.0019289 0.00085544)
        Marker RHJC: femur_r (0.0028005 0.00194253 0.00007874)
        Marker RTH1: femur_r (-0.00842073 -0.1048235 0.09691367)
        Marker RTH2: femur_r (0.04996138 -0.2449768 0.07968165)
        Marker RTH3: femur_r (-0.01767888 -0.3363423 0.06354245)
        Marker RLFC: femur_r (0.00482404 -0.4392505 0.06778954)
        Marker RMFC: femur_r (0.00351226 -0.4435094 -0.06026798)
        Marker RTB1: tibia_r (0.05205197 -0.1401611 0.02161089)
        Marker RTB2: tibia_r (-0.00421486 -0.1977923 0.07891106)
        Marker RTB3: tibia_r (0.04103497 -0.3198866 0.022292)
        Marker RLMAL: tibia_r (-0.0091964 -0.4370845 0.04867543)
        Marker RMMAL: tibia_r (0.01291863 -0.4165392 -0.03723207)
        Marker RCAL: calcn_r (-0.01376604 0.03568145 -0.02063066)
        Marker RTOE: calcn_r (0.1981587 0.05667892 -0.01754564)
        Marker RMT5: calcn_r (0.1806844 0.00991991 0.07939569)
        Marker LTH1: femur_l (0.00429506 -0.1137381 -0.1013666)
        Marker LTH2: femur_l (0.06927882 -0.2121975 -0.07746401)
        Marker LTH3: femur_l (-0.0171666 -0.3323818 -0.07070959)
        Marker LLFC: femur_l (0.00362423 -0.4326003 -0.07052882)
        Marker LMFC: femur_l (0.00109535 -0.4437774 0.05077014)
        Marker LTB1: tibia_l (0.04870312 -0.1397257 -0.02702052)
        Marker LTB2: tibia_l (0.0051297 -0.2349765 -0.07494996)
        Marker LTB3: tibia_l (0.03810618 -0.3326676 -0.01259893)
        Marker LLMAL: tibia_l (-0.01166156 -0.4330924 -0.04404019)
        Marker LMMAL: tibia_l (0.01614087 -0.4142426 0.03995633)
        Marker LCAL: calcn_l (-0.01506761 0.04592033 0.02066686)
        Marker LTOE: calcn_l (0.1944928 0.05982492 0.02589208)
        Marker LMT5: calcn_l (0.1774745 0.01675666 -0.07425393)
  ActuatorSet:
    Thelen2003Muscle [values shared by the 92 below unless stated]: muscle_model=9 activation_time_constant=0.01
        deactivation_time_constant=0.04 Vmax=10 Vmax0=5 FmaxTendonStrain=0.033 FmaxMuscleStrain=0.6 KshapeActive=0.5
        KshapePassive=4 damping=0.05 Af=0.3 Flen=1.8
    Thelen2003Muscle glut_med1_r: max_isometric_force=819 optimal_fiber_length=0.04744914
        tendon_slack_length=0.06917818 pennation_angle=0.1396263
      MusclePoint P1: pelvis (-0.03649125 0.02514863 0.1212878)
      MusclePoint P2: femur_r (-0.0235044 -0.01261475 0.05983918)
    Thelen2003Muscle glut_med2_r: max_isometric_force=573 optimal_fiber_length=0.07572344
        tendon_slack_length=0.04749517 pennation_angle=0
      MusclePoint P1: pelvis (-0.07647064 0.03681296 0.07684569)
      MusclePoint P2: femur_r (-0.02781713 -0.00625346 0.05682027)
    Thelen2003Muscle glut_med3_r: max_isometric_force=653 optimal_fiber_length=0.06016088 tendon_slack_length=0.049358
        pennation_angle=0.3316126
      MusclePoint P1: pelvis (-0.1093843 0.0086862 0.06500784)
      MusclePoint P2: femur_r (-0.03331587 -0.00506746 0.0558499)
    Thelen2003Muscle glut_min1_r: max_isometric_force=270 optimal_fiber_length=0.06288294
        tendon_slack_length=0.01479599 pennation_angle=0.1745329
      MusclePoint P1: pelvis (-0.04176818 -0.00661806 0.1059387)
      MusclePoint P2: femur_r (-0.00776292 -0.01121311 0.06037827)
    Thelen2003Muscle glut_min2_r: max_isometric_force=285 optimal_fiber_length=0.05230607
        tendon_slack_length=0.02428496 pennation_angle=0
      MusclePoint P1: pelvis (-0.05661511 -0.00537717 0.09941785)
      MusclePoint P2: femur_r (-0.01035056 -0.01121311 0.06037827)
    Thelen2003Muscle glut_min3_r: max_isometric_force=323 optimal_fiber_length=0.03605286
        tendon_slack_length=0.04838673 pennation_angle=0.01745329
      MusclePoint P1: pelvis (-0.07459242 -0.00521172 0.08587455)
      MusclePoint P2: femur_r (-0.01455548 -0.00894892 0.05930009)
    Thelen2003Muscle semimem_r: max_isometric_force=1288 optimal_fiber_length=0.08778749 tendon_slack_length=0.3939464
        pennation_angle=0.2617994
      MusclePoint P1: pelvis (-0.1066117 -0.08063278 0.07173936)
      MuscleViaPoint P2: tibia_r (-0.03763833 -0.03806014 -0.02045232) range=(-0.5585054 0.1745329)
          coordinate=knee_angle_r
      MusclePoint P3: tibia_r (-0.02920215 -0.05160129 -0.02116615)
    Thelen2003Muscle semiten_r: max_isometric_force=410 optimal_fiber_length=0.2215944 tendon_slack_length=0.2816785
        pennation_angle=0.08726646
      MusclePoint P1: pelvis (-0.1130066 -0.09089905 0.0605837)
      MuscleViaPoint P2: tibia_r (-0.04545802 -0.03092183 -0.02462715) range=(-0.3316126 0.1745329)
          coordinate=knee_angle_r
      MusclePoint P3: tibia_r (-0.03592946 -0.05712806 -0.02474612)
      MusclePoint P4: tibia_r (-0.01222164 -0.08068447 -0.02649825)
      MusclePoint P5: tibia_r (0.00292022 -0.1033972 -0.02087413)
    Thelen2003Muscle bifemlh_r: max_isometric_force=896 optimal_fiber_length=0.119799 tendon_slack_length=0.358298
        pennation_angle=0
      MusclePoint P1: pelvis (-0.1126578 -0.08485179 0.06966272)
      MusclePoint P2: tibia_r (-0.03255499 -0.0389362 0.03183035)
      MusclePoint P3: tibia_r (-0.02530853 -0.0608919 0.03709755)
    Thelen2003Muscle bifemsh_r: max_isometric_force=804 optimal_fiber_length=0.1866763 tendon_slack_length=0.0960358
        pennation_angle=0.4014257
      MusclePoint P1: femur_r (0.00539092 -0.2276045 0.02522949)
      MusclePoint P2: tibia_r (-0.03255499 -0.0389362 0.03183035)
      MusclePoint P3: tibia_r (-0.02530853 -0.0608919 0.03709755)
    Thelen2003Muscle sar_r: max_isometric_force=156 optimal_fiber_length=0.544785 tendon_slack_length=0.1047664
        pennation_angle=0
      MusclePoint P1: pelvis (-0.01368422 -0.00107543 0.1245984)
      MusclePoint P2: femur_r (-0.00323455 -0.3846958 -0.04539152)
      MusclePoint P3: tibia_r (-0.00605674 -0.04531741 -0.04315429)
      MusclePoint P4: tibia_r (0.00648937 -0.06370395 -0.04142379)
      MusclePoint P5: tibia_r (0.02628194 -0.09085114 -0.02725534)
    Thelen2003Muscle add_long_r: max_isometric_force=627 optimal_fiber_length=0.149379 tendon_slack_length=0.1190702
        pennation_angle=0.1047198
      MusclePoint P1: pelvis (-0.02826283 -0.06915872 0.01695421)
      MusclePoint P2: femur_r (0.00539092 -0.2276045 0.02522949)
    Thelen2003Muscle add_brev_r: max_isometric_force=429 optimal_fiber_length=0.144291 tendon_slack_length=0.02169789
        pennation_angle=0
      MusclePoint P1: pelvis (-0.0525009 -0.07569405 0.0164526)
      MusclePoint P2: femur_r (0.00097037 -0.1289507 0.03169859)
    Thelen2003Muscle add_mag1_r: max_isometric_force=381 optimal_fiber_length=0.09755074 tendon_slack_length=0.06727637
        pennation_angle=0.08726646
      MusclePoint P1: pelvis (-0.0654696 -0.09712002 0.02558179)
      MusclePoint P2: femur_r (-0.00485183 -0.130568 0.03655042)
    Thelen2003Muscle add_mag2_r: max_isometric_force=343 optimal_fiber_length=0.1371677 tendon_slack_length=0.1360341
        pennation_angle=0.05235988
      MusclePoint P1: pelvis (-0.0743241 -0.09860908 0.03089879)
      MusclePoint P2: femur_r (0.00582219 -0.2463649 0.02447476)
    Thelen2003Muscle add_mag3_r: max_isometric_force=488 optimal_fiber_length=0.1454725 tendon_slack_length=0.2765088
        pennation_angle=0.08726646
      MusclePoint P1: pelvis (-0.09934923 -0.09441489 0.04897659)
      MusclePoint P2: femur_r (0.00754728 -0.413699 -0.02867968)
    Thelen2003Muscle tfl_r: max_isometric_force=233 optimal_fiber_length=0.09860261 tendon_slack_length=0.441117
        pennation_angle=0.05235988
      MusclePoint P1: pelvis (-0.02781564 0.01770331 0.124498)
      MusclePoint P2: femur_r (0.03169859 -0.1072793 0.06436755)
      MusclePoint P3: femur_r (0.00582219 -0.4365565 0.03849115)
      MusclePoint P4: tibia_r (0.00648937 -0.05267203 0.03212237)
    Thelen2003Muscle pect_r: max_isometric_force=266 optimal_fiber_length=0.1061862 tendon_slack_length=0.03504143
        pennation_angle=0
      MusclePoint P1: pelvis (-0.03854836 -0.06353337 0.04524465)
      MusclePoint P2: femur_r (-0.01315384 -0.08862668 0.02727804)
    Thelen2003Muscle grac_r: max_isometric_force=162 optimal_fiber_length=0.3901875 tendon_slack_length=0.1396694
        pennation_angle=0.05235988
      MusclePoint P1: pelvis (-0.06619406 -0.09819546 0.02802962)
      MuscleViaPoint P2: tibia_r (-0.02873708 -0.0345018 -0.04081812) range=(-0.4363323 0.1745329)
          coordinate=knee_angle_r
      MusclePoint P3: tibia_r (-0.02101473 -0.05573285 -0.03871989)
      MusclePoint P4: tibia_r (0.00648937 -0.09041852 -0.0246596)
    Thelen2003Muscle glut_max1_r: max_isometric_force=573 optimal_fiber_length=0.1310003 tendon_slack_length=0.1153171
        pennation_angle=0.08726646
      MusclePoint P1: pelvis (-0.10688 0.05062815 0.07022452)
      MusclePoint P2: pelvis (-0.1154662 0.00099271 0.08888418)
      MusclePoint P3: femur_r (-0.04927298 -0.02673895 0.04226479)
      MusclePoint P4: femur_r (-0.02986568 -0.06102518 0.05067462)
    Thelen2003Muscle glut_max2_r: max_isometric_force=819 optimal_fiber_length=0.1424892 tendon_slack_length=0.123103
        pennation_angle=0
      MusclePoint P1: pelvis (-0.1206537 0.01455973 0.05648058)
      MusclePoint P2: pelvis (-0.1230685 -0.04301739 0.09169316)
      MusclePoint P3: femur_r (-0.04593061 -0.05714372 0.03159077)
      MusclePoint P4: femur_r (-0.01681966 -0.1095434 0.04517588)
    Thelen2003Muscle glut_max3_r: max_isometric_force=552 optimal_fiber_length=0.1433255 tendon_slack_length=0.1443209
        pennation_angle=0.08726646
      MusclePoint P1: pelvis (-0.1391676 -0.02597588 0.0058186)
      MusclePoint P2: pelvis (-0.1367528 -0.08702748 0.04042926)
      MusclePoint P3: femur_r (-0.03223768 -0.1122389 0.01455548)
      MusclePoint P4: femur_r (-0.0064691 -0.1529942 0.04431334)
    Thelen2003Muscle iliacus_r: max_isometric_force=1073 optimal_fiber_length=0.09196768 tendon_slack_length=0.09196768
        pennation_angle=0.1221731
      MusclePoint P1: pelvis (-0.06028212 0.0301949 0.08567391)
      MusclePoint P2: pelvis (-0.02307535 -0.04549916 0.08136012)
      MuscleViaPoint P3: pelvis (-0.02575853 -0.06659422 0.08186172) range=(-1.570796 0.7853982)
          coordinate=hip_flexion_r
      MusclePoint P4: femur_r (0.00183291 -0.05854536 0.00614565)
      MusclePoint P5: femur_r (-0.02080894 -0.06695519 0.01390857)
    Thelen2003Muscle psoas_r: max_isometric_force=1113 optimal_fiber_length=0.09058239 tendon_slack_length=0.1449318
        pennation_angle=0.1396263
      MusclePoint P1: pelvis (-0.05786726 0.07337773 0.02899269)
      MusclePoint P2: pelvis (-0.02128657 -0.04715367 0.07614344)
      MuscleViaPoint P3: pelvis (-0.02575853 -0.06659422 0.08186172) range=(-1.570796 0.7853982)
          coordinate=hip_flexion_r
      MusclePoint P4: femur_r (0.00172509 -0.0546639 0.0040971)
      MusclePoint P5: femur_r (-0.02026985 -0.06436755 0.01121311)
    Thelen2003Muscle quad_fem_r: max_isometric_force=381 optimal_fiber_length=0.0552034 tendon_slack_length=0.02453484
        pennation_angle=0
      MusclePoint P1: pelvis (-0.1022292 -0.09521733 0.05216679)
      MusclePoint P2: femur_r (-0.04107879 -0.03870678 0.03946151)
    Thelen2003Muscle gem_r: max_isometric_force=164 optimal_fiber_length=0.02415437 tendon_slack_length=0.03925085
        pennation_angle=0
      MusclePoint P1: pelvis (-0.1013348 -0.06783511 0.07162901)
      MusclePoint P2: femur_r (-0.0153102 -0.00355801 0.04776353)
    Thelen2003Muscle peri_r: max_isometric_force=444 optimal_fiber_length=0.02490668 tendon_slack_length=0.1101642
        pennation_angle=0.1745329
      MusclePoint P1: pelvis (-0.1248573 0.00024818 0.02357537)
      MusclePoint P2: pelvis (-0.1067011 -0.0228323 0.06591073)
      MusclePoint P3: femur_r (-0.01595711 -0.00388146 0.04711662)
    Thelen2003Muscle rect_fem_r: max_isometric_force=1169 optimal_fiber_length=0.120554 tendon_slack_length=0.3278221
        pennation_angle=0.08726646
      MusclePoint P1: pelvis (-0.02638461 -0.02572771 0.09711048)
      MuscleViaPoint P2: femur_r (0.03601133 -0.4345079 0.00204855) range=(-2.617994 -1.459968) coordinate=knee_angle_r
      MovingMusclePoint P3: tibia_r (0.06080361 0.02409139 0.00151419) x_coordinate=knee_angle_r
          y_coordinate=knee_angle_r z_coordinate=knee_angle_r
        XAttachment:
          natCubicSpline: min_x=-1000000000000000000000000000000 max_x=1000000000000000000000000000000
              min_y=-1000000000000000000000000000000 max_y=1000000000000000000000000000000
              min_z=-1000000000000000000000000000000 max_z=1000000000000000000000000000000
              x=(-2.094395 -1.999973 -1.570796 -1.457524 -1.396263 -1.047198 -0.6981317 -0.5263913 -0.3490659 -0.1745329 0 0.00017453 0.00034907 0.02792527 0.08726646 0.1745329 2.094395)
              y=(0.01685126 0.01946142 0.02975169 0.03207516 0.0332705 0.03955218 0.04564991 0.04876779 0.05233783 0.05778774 0.06679457 0.06680465 0.06681474 0.06847181 0.07245807 0.07928218 0.06202545)
        YAttachment:
          natCubicSpline: min_x=-1000000000000000000000000000000 max_x=1000000000000000000000000000000
              min_y=-1000000000000000000000000000000 max_y=1000000000000000000000000000000
              min_z=-1000000000000000000000000000000 max_z=1000000000000000000000000000000
              x=(-2.094395 -1.999973 -1.570796 -1.457524 -1.396263 -1.047198 -0.6981317 -0.5263913 -0.3490659 -0.1745329 0 0.00017453 0.00034907 0.02792527 0.08726646 0.1745329 2.094395)
              y=(0.0253211 0.02569931 0.02716247 0.0273413 0.02737932 0.02695077 0.02621413 0.02578953 0.02532986 0.02462109 0.0226955 0.0226927 0.02268989 0.02219631 0.02073938 0.01725678 -0.07287275)
        ZAttachment:
          natCubicSpline: min_x=-1000000000000000000000000000000 max_x=1000000000000000000000000000000
              min_y=-1000000000000000000000000000000 max_y=1000000000000000000000000000000
              min_z=-1000000000000000000000000000000 max_z=1000000000000000000000000000000 x=(-2.0944 0.1745)
              y=(0.00151419 0.00151419)
    Thelen2003Muscle vas_med_r: max_isometric_force=1294 optimal_fiber_length=0.09594086 tendon_slack_length=0.1358264
        pennation_angle=0.08726646
      MusclePoint P1: femur_r (0.01509457 -0.2263107 0.02026985)
      MusclePoint P2: femur_r (0.03838333 -0.298549 0.00097037)
      MuscleViaPoint P3: femur_r (0.03989279 -0.4364486 -0.01347729) range=(-2.617994 -1.210037)
          coordinate=knee_angle_r
      MuscleViaPoint P4: femur_r (0.02954223 -0.458767 -0.0141242) range=(-2.617994 -1.780061) coordinate=knee_angle_r
      MovingMusclePoint P5: tibia_r (0.0544731 0.024258 -0.01579079) x_coordinate=knee_angle_r
          y_coordinate=knee_angle_r z_coordinate=knee_angle_r
        XAttachment:
          natCubicSpline: min_x=-1000000000000000000000000000000 max_x=1000000000000000000000000000000
              min_y=-1000000000000000000000000000000 max_y=1000000000000000000000000000000
              min_z=-1000000000000000000000000000000 max_z=1000000000000000000000000000000
              x=(-2.094395 -1.999973 -1.570796 -1.457524 -1.396263 -1.047198 -0.6981317 -0.5263913 -0.3490659 -0.1745329 0 0.00017453 0.00034907 0.02792527 0.08726646 0.1745329 2.094395)
              y=(0.01061116 0.01322132 0.02350999 0.02583319 0.02702847 0.03330764 0.03938907 0.04249136 0.04603713 0.05145681 0.06052266 0.06053293 0.06054321 0.06223505 0.06633949 0.07349242 0.06806608)
        YAttachment:
          natCubicSpline: min_x=-1000000000000000000000000000000 max_x=1000000000000000000000000000000
              min_y=-1000000000000000000000000000000 max_y=1000000000000000000000000000000
              min_z=-1000000000000000000000000000000 max_z=1000000000000000000000000000000
              x=(-2.094395 -1.999973 -1.570796 -1.457524 -1.396263 -1.047198 -0.6981317 -0.5263913 -0.3490659 -0.1745329 0 0.00017453 0.00034907 0.02792527 0.08726646 0.1745329 2.094395)
              y=(0.02424363 0.02462183 0.02609426 0.02627471 0.026313 0.02589933 0.02526448 0.02494911 0.02469662 0.02448244 0.02356901 0.02356755 0.02356607 0.02329302 0.02237122 0.01982164 -0.07097255)
        ZAttachment:
          natCubicSpline: min_x=-1000000000000000000000000000000 max_x=1000000000000000000000000000000
              min_y=-1000000000000000000000000000000 max_y=1000000000000000000000000000000
              min_z=-1000000000000000000000000000000 max_z=1000000000000000000000000000000 x=(-2.094395 2.094395)
              y=(-0.01579079 -0.01579079)
    Thelen2003Muscle vas_int_r: max_isometric_force=1365 optimal_fiber_length=0.09377094 tendon_slack_length=0.1465845
        pennation_angle=0.05235988
      MusclePoint P1: femur_r (0.03126732 -0.2074425 0.03342369)
      MusclePoint P2: femur_r (0.03611914 -0.2246934 0.03072823)
      MuscleViaPoint P3: femur_r (0.03698169 -0.4345079 0.00593001) range=(-2.617994 -1.42) coordinate=knee_angle_r
      MovingMusclePoint P4: tibia_r (0.05351673 0.02796227 0.00194681) x_coordinate=knee_angle_r
          y_coordinate=knee_angle_r z_coordinate=knee_angle_r
        XAttachment:
          natCubicSpline: min_x=-1000000000000000000000000000000 max_x=1000000000000000000000000000000
              min_y=-1000000000000000000000000000000 max_y=1000000000000000000000000000000
              min_z=-1000000000000000000000000000000 max_z=1000000000000000000000000000000
              x=(-2.094395 -1.999973 -1.570796 -1.457524 -1.396263 -1.047198 -0.6981317 -0.5263913 -0.3490659 -0.1745329 0 0.00017453 0.00034907 0.02792527 0.08726646 0.1745329 2.094395)
              y=(0.00894808 0.01155823 0.02185204 0.02417612 0.02537155 0.03165893 0.03779676 0.04095985 0.04462185 0.05032363 0.05998687 0.05999794 0.06000903 0.06183468 0.06626941 0.07401864 0.07017358)
        YAttachment:
          natCubicSpline: min_x=-1000000000000000000000000000000 max_x=1000000000000000000000000000000
              min_y=-1000000000000000000000000000000 max_y=1000000000000000000000000000000
              min_z=-1000000000000000000000000000000 max_z=1000000000000000000000000000000
              x=(-2.094395 -1.999973 -1.570796 -1.457524 -1.396263 -1.047198 -0.6981317 -0.5263913 -0.3490659 -0.1745329 0 0.00017453 0.00034907 0.02792527 0.08726646 0.1745329 2.094395)
              y=(0.02768693 0.02806513 0.02954004 0.02972091 0.02975928 0.02934955 0.02874107 0.02845291 0.02824897 0.02813457 0.02735519 0.02735384 0.02735248 0.0270959 0.02619447 0.02360916 -0.07416326)
        ZAttachment:
          natCubicSpline: min_x=-1000000000000000000000000000000 max_x=1000000000000000000000000000000
              min_y=-1000000000000000000000000000000 max_y=1000000000000000000000000000000
              min_z=-1000000000000000000000000000000 max_z=1000000000000000000000000000000 x=(-2.0944 2.0944)
              y=(0.00194681 0.00194681)
    Thelen2003Muscle vas_lat_r: max_isometric_force=1871 optimal_fiber_length=0.09055614 tendon_slack_length=0.1692537
        pennation_angle=0.08726646
      MusclePoint P1: femur_r (0.00517528 -0.1998952 0.0376286)
      MusclePoint P2: femur_r (0.02900313 -0.2793573 0.0440977)
      MuscleViaPoint P3: femur_r (0.03892242 -0.4345079 0.02210276) range=(-2.617994 -1.210037) coordinate=knee_angle_r
      MuscleViaPoint P4: femur_r (0.02727804 -0.4574732 0.01983857) range=(-2.617994 -1.920037) coordinate=knee_angle_r
      MovingMusclePoint P5: tibia_r (0.05903588 0.02237186 0.01784576) x_coordinate=knee_angle_r
          y_coordinate=knee_angle_r z_coordinate=knee_angle_r
        XAttachment:
          natCubicSpline: min_x=-1000000000000000000000000000000 max_x=1000000000000000000000000000000
              min_y=-1000000000000000000000000000000 max_y=1000000000000000000000000000000
              min_z=-1000000000000000000000000000000 max_z=1000000000000000000000000000000
              x=(-2.094395 -1.999973 -1.570796 -1.457524 -1.396263 -1.047198 -0.6981317 -0.5263913 -0.3490659 -0.1745329 0 0.00017453 0.00034907 0.02792527 0.08726646 0.1745329 2.094395)
              y=(0.0154552 0.01806536 0.02835261 0.03067555 0.0318708 0.03814765 0.04421257 0.04729574 0.05080139 0.05610515 0.06484577 0.06485553 0.06486529 0.06647032 0.07033947 0.07699278 0.06313784)
        YAttachment:
          natCubicSpline: min_x=-1000000000000000000000000000000 max_x=1000000000000000000000000000000
              min_y=-1000000000000000000000000000000 max_y=1000000000000000000000000000000
              min_z=-1000000000000000000000000000000 max_z=1000000000000000000000000000000
              x=(-2.094395 -1.999973 -1.570796 -1.457524 -1.396263 -1.047198 -0.6981317 -0.5263913 -0.3490659 -0.1745329 0 0.00017453 0.00034907 0.02792527 0.08726646 0.1745329 2.094395)
              y=(0.02328792 0.02366613 0.02513136 0.02531055 0.02534864 0.02492343 0.02420993 0.02381067 0.02340056 0.02281783 0.02118389 0.0211815 0.0211791 0.02075518 0.0194767 0.01633947 -0.07067151)
        ZAttachment:
          natCubicSpline: min_x=-1000000000000000000000000000000 max_x=1000000000000000000000000000000
              min_y=-1000000000000000000000000000000 max_y=1000000000000000000000000000000
              min_z=-1000000000000000000000000000000 max_z=1000000000000000000000000000000 x=(-2.094395 2.094395)
              y=(0.01784576 0.01784576)
    Thelen2003Muscle med_gas_r: max_isometric_force=1558 optimal_fiber_length=0.06488398 tendon_slack_length=0.4217459
        pennation_angle=0.296706
      MusclePoint P1: femur_r (-0.02048548 -0.4236183 -0.02533731)
      MuscleViaPoint P2: femur_r (-0.0323455 -0.4336454 -0.02781713) range=(-0.7853982 0.1745329)
          coordinate=knee_angle_r
      MusclePoint P3: calcn_r (0 0.03342889 -0.00571526)
    Thelen2003Muscle lat_gas_r: max_isometric_force=683 optimal_fiber_length=0.06921136 tendon_slack_length=0.4109424
        pennation_angle=0.1396263
      MusclePoint P1: femur_r (-0.02372004 -0.4254512 0.02932659)
      MuscleViaPoint P2: femur_r (-0.0323455 -0.4332141 0.02954223) range=(-0.7853982 0.1745329)
          coordinate=knee_angle_r
      MusclePoint P3: calcn_r (0 0.03342889 -0.00571526)
    Thelen2003Muscle soleus_r: max_isometric_force=3549 optimal_fiber_length=0.05406786 tendon_slack_length=0.2703393
        pennation_angle=0.4363323
      MusclePoint P1: tibia_r (-0.00259575 -0.1658033 0.00767908)
      MusclePoint P2: calcn_r (0 0.03342889 -0.00571526)
    Thelen2003Muscle tib_post_r: max_isometric_force=1588 optimal_fiber_length=0.03351542 tendon_slack_length=0.3351542
        pennation_angle=0.2094395
      MusclePoint P1: tibia_r (-0.01016668 -0.1457944 0.00205497)
      MusclePoint P2: tibia_r (-0.01557448 -0.4381404 -0.02476775)
      MusclePoint P3: calcn_r (0.04496725 0.03601693 -0.03084085)
      MusclePoint P4: calcn_r (0.08324872 0.01714579 -0.03030167)
    Thelen2003Muscle flex_dig_r: max_isometric_force=310 optimal_fiber_length=0.03672172 tendon_slack_length=0.4320202
        pennation_angle=0.1221731
      MusclePoint P1: tibia_r (-0.00897696 -0.2212874 -0.00194681)
      MusclePoint P2: tibia_r (-0.01665604 -0.4381404 -0.0211986)
      MusclePoint P3: calcn_r (0.04701612 0.03396807 -0.03019384)
      MusclePoint P4: calcn_r (0.07634727 0.01897898 -0.02836064)
      MusclePoint P5: calcn_r (0.1787906 -0.00873465 0.01250888)
      MusclePoint P6: toes_r (-0.00204887 -0.00841114 0.01585176)
      MusclePoint P7: toes_r (0.03073301 -0.00765629 0.02318455)
      MusclePoint P8: toes_r (0.04755529 -0.00647011 0.0260961)
    Thelen2003Muscle flex_hal_r: max_isometric_force=322 optimal_fiber_length=0.04643667 tendon_slack_length=0.4103705
        pennation_angle=0.1745329
      MusclePoint P1: tibia_r (-0.00854433 -0.2524364 0.02639009)
      MusclePoint P2: tibia_r (-0.02011704 -0.4411688 -0.01881916)
      MusclePoint P3: calcn_r (0.04033034 0.0297625 -0.02598827)
      MusclePoint P4: calcn_r (0.1119329 0.00733279 -0.02760579)
      MusclePoint P5: calcn_r (0.1861234 -0.00571526 -0.02900765)
      MusclePoint P6: toes_r (0.01671445 -0.00690145 -0.02857631)
      MusclePoint P7: toes_r (0.06060334 -0.01099918 -0.01951816)
    Thelen2003Muscle tib_ant_r: max_isometric_force=905 optimal_fiber_length=0.1059343 tendon_slack_length=0.2410545
        pennation_angle=0.08726646
      MusclePoint P1: tibia_r (0.01935995 -0.1756455 0.01243795)
      MusclePoint P2: tibia_r (0.03558336 -0.4273248 -0.01914363)
      MusclePoint P3: calcn_r (0.1257358 0.01919465 -0.03288972)
    Thelen2003Muscle per_brev_r: max_isometric_force=435 optimal_fiber_length=0.05404926 tendon_slack_length=0.1740386
        pennation_angle=0.08726646
      MusclePoint P1: tibia_r (-0.00757093 -0.2861811 0.03515074)
      MusclePoint P2: tibia_r (-0.02141491 -0.4525252 0.03060818)
      MusclePoint P3: tibia_r (-0.01557448 -0.4645305 0.03125712)
      MusclePoint P4: calcn_r (0.05079035 0.02911549 0.02512559)
      MusclePoint P5: calcn_r (0.07300438 0.02361589 0.03698745)
    Thelen2003Muscle per_long_r: max_isometric_force=943 optimal_fiber_length=0.05295156 tendon_slack_length=0.3728222
        pennation_angle=0.1745329
      MusclePoint P1: tibia_r (0.00054078 -0.1695888 0.03915252)
      MusclePoint P2: tibia_r (-0.02238832 -0.4547965 0.03093265)
      MusclePoint P3: tibia_r (-0.01752129 -0.4671263 0.03125712)
      MusclePoint P4: calcn_r (0.04723179 0.02480208 0.02383156)
      MusclePoint P5: calcn_r (0.07343573 0.01143052 0.03062518)
      MusclePoint P6: calcn_r (0.09187553 0.00744062 0.01272455)
      MusclePoint P7: calcn_r (0.1297257 0.00916599 -0.01984166)
    Thelen2003Muscle per_tert_r: max_isometric_force=180 optimal_fiber_length=0.08538156 tendon_slack_length=0.1080779
        pennation_angle=0.2268928
      MusclePoint P1: tibia_r (0.00108156 -0.3032698 0.02498406)
      MusclePoint P2: tibia_r (0.02476775 -0.4400872 0.01719682)
      MusclePoint P3: calcn_r (0.09241471 0.02458641 0.0322427)
    Thelen2003Muscle ext_dig_r: max_isometric_force=512 optimal_fiber_length=0.110199 tendon_slack_length=0.372732
        pennation_angle=0.1396263
      MusclePoint P1: tibia_r (0.003461 -0.1493636 0.02985109)
      MusclePoint P2: tibia_r (0.03125712 -0.4333816 0.00778724)
      MusclePoint P3: calcn_r (0.09942399 0.04184003 -0.00010784)
      MusclePoint P4: calcn_r (0.1742616 0.00593093 0.01401857)
      MusclePoint P5: toes_r (0.00032351 0.00506825 0.01649878)
      MusclePoint P6: toes_r (0.04777096 -0.00043134 0.02695878)
    Thelen2003Muscle ext_hal_r: max_isometric_force=162 optimal_fiber_length=0.1199059 tendon_slack_length=0.3294713
        pennation_angle=0.1047198
      MusclePoint P1: tibia_r (0.00129787 -0.1911119 0.0246596)
      MusclePoint P2: tibia_r (0.0352589 -0.4310021 -0.00919327)
      MusclePoint P3: calcn_r (0.1046001 0.04194787 -0.02275321)
      MusclePoint P4: calcn_r (0.1394308 0.03332106 -0.02771363)
      MusclePoint P5: calcn_r (0.1869861 0.01498908 -0.03019384)
      MusclePoint P6: toes_r (0.03213487 0.00442124 -0.02641961)
      MusclePoint P7: toes_r (0.06071118 0.00366639 -0.02005733)
    Thelen2003Muscle glut_med1_l: max_isometric_force=819 optimal_fiber_length=0.04744914
        tendon_slack_length=0.06917818 pennation_angle=0.1396263
      MusclePoint P1: pelvis (-0.03649125 0.02514863 -0.1212878)
      MusclePoint P2: femur_l (-0.0235044 -0.01261475 -0.05983918)
    Thelen2003Muscle glut_med2_l: max_isometric_force=573 optimal_fiber_length=0.07572344
        tendon_slack_length=0.04749517 pennation_angle=0
      MusclePoint P1: pelvis (-0.07647064 0.03681296 -0.07684569)
      MusclePoint P2: femur_l (-0.02781713 -0.00625346 -0.05682027)
    Thelen2003Muscle glut_med3_l: max_isometric_force=653 optimal_fiber_length=0.06016088 tendon_slack_length=0.049358
        pennation_angle=0.3316126
      MusclePoint P1: pelvis (-0.1093843 0.0086862 -0.06500784)
      MusclePoint P2: femur_l (-0.03331587 -0.00506746 -0.0558499)
    Thelen2003Muscle glut_min1_l: max_isometric_force=270 optimal_fiber_length=0.06288294
        tendon_slack_length=0.01479599 pennation_angle=0.1745329
      MusclePoint P1: pelvis (-0.04176818 -0.00661806 -0.1059387)
      MusclePoint P2: femur_l (-0.00776292 -0.01121311 -0.06037827)
    Thelen2003Muscle glut_min2_l: max_isometric_force=285 optimal_fiber_length=0.05230607
        tendon_slack_length=0.02428496 pennation_angle=0
      MusclePoint P1: pelvis (-0.05661511 -0.00537717 -0.09941785)
      MusclePoint P2: femur_l (-0.01035056 -0.01121311 -0.06037827)
    Thelen2003Muscle glut_min3_l: max_isometric_force=323 optimal_fiber_length=0.03605286
        tendon_slack_length=0.04838673 pennation_angle=0.01745329
      MusclePoint P1: pelvis (-0.07459242 -0.00521172 -0.08587455)
      MusclePoint P2: femur_l (-0.01455548 -0.00894892 -0.05930009)
    Thelen2003Muscle semimem_l: max_isometric_force=1288 optimal_fiber_length=0.08777856 tendon_slack_length=0.3939063
        pennation_angle=0.2617994
      MusclePoint P1: pelvis (-0.1066117 -0.08063278 -0.07173936)
      MuscleViaPoint P2: tibia_l (-0.03763833 -0.03806014 0.01783273) range=(-0.5585054 0.1745329)
          coordinate=knee_angle_l
      MusclePoint P3: tibia_l (-0.02920215 -0.05160129 0.01845513)
    Thelen2003Muscle semiten_l: max_isometric_force=410 optimal_fiber_length=0.2215309 tendon_slack_length=0.2815977
        pennation_angle=0.08726646
      MusclePoint P1: pelvis (-0.1130066 -0.09089905 -0.0605837)
      MuscleViaPoint P2: tibia_l (-0.04545802 -0.03092183 0.02147283) range=(-0.3316126 0.1745329)
          coordinate=knee_angle_l
      MusclePoint P3: tibia_l (-0.03592946 -0.05712806 0.02157657)
      MusclePoint P4: tibia_l (-0.01222164 -0.08068447 0.02310428)
      MusclePoint P5: tibia_l (0.00292022 -0.1033972 0.01820051)
    Thelen2003Muscle bifemlh_l: max_isometric_force=896 optimal_fiber_length=0.1196565 tendon_slack_length=0.3578718
        pennation_angle=0
      MusclePoint P1: pelvis (-0.1126578 -0.08485179 -0.06966272)
      MusclePoint P2: tibia_l (-0.03255499 -0.0389362 -0.02775343)
      MusclePoint P3: tibia_l (-0.02530853 -0.0608919 -0.03234599)
    Thelen2003Muscle bifemsh_l: max_isometric_force=804 optimal_fiber_length=0.1865235 tendon_slack_length=0.09595717
        pennation_angle=0.4014257
      MusclePoint P1: femur_l (0.00539092 -0.2276045 -0.02522949)
      MusclePoint P2: tibia_l (-0.03255499 -0.0389362 -0.02775343)
      MusclePoint P3: tibia_l (-0.02530853 -0.0608919 -0.03234599)
    Thelen2003Muscle sar_l: max_isometric_force=156 optimal_fiber_length=0.5444491 tendon_slack_length=0.1047017
        pennation_angle=0
      MusclePoint P1: pelvis (-0.01368422 -0.00107543 -0.1245984)
      MusclePoint P2: femur_l (-0.00323455 -0.3846958 0.04539152)
      MusclePoint P3: tibia_l (-0.00605674 -0.04531741 0.03762697)
      MusclePoint P4: tibia_l (0.00648937 -0.06370395 0.03611812)
      MusclePoint P5: tibia_l (0.02628194 -0.09085114 0.0237644)
    Thelen2003Muscle add_long_l: max_isometric_force=627 optimal_fiber_length=0.149379 tendon_slack_length=0.1190702
        pennation_angle=0.1047198
      MusclePoint P1: pelvis (-0.02826283 -0.06915872 -0.01695421)
      MusclePoint P2: femur_l (0.00539092 -0.2276045 -0.02522949)
    Thelen2003Muscle add_brev_l: max_isometric_force=429 optimal_fiber_length=0.144291 tendon_slack_length=0.02169789
        pennation_angle=0
      MusclePoint P1: pelvis (-0.0525009 -0.07569405 -0.0164526)
      MusclePoint P2: femur_l (0.00097037 -0.1289507 -0.03169859)
    Thelen2003Muscle add_mag1_l: max_isometric_force=381 optimal_fiber_length=0.09755074 tendon_slack_length=0.06727637
        pennation_angle=0.08726646
      MusclePoint P1: pelvis (-0.0654696 -0.09712002 -0.02558179)
      MusclePoint P2: femur_l (-0.00485183 -0.130568 -0.03655042)
    Thelen2003Muscle add_mag2_l: max_isometric_force=343 optimal_fiber_length=0.1371677 tendon_slack_length=0.1360341
        pennation_angle=0.05235988
      MusclePoint P1: pelvis (-0.0743241 -0.09860908 -0.03089879)
      MusclePoint P2: femur_l (0.00582219 -0.2463649 -0.02447476)
    Thelen2003Muscle add_mag3_l: max_isometric_force=488 optimal_fiber_length=0.1454725 tendon_slack_length=0.2765088
        pennation_angle=0.08726646
      MusclePoint P1: pelvis (-0.09934923 -0.09441489 -0.04897659)
      MusclePoint P2: femur_l (0.00754728 -0.413699 0.02867968)
    Thelen2003Muscle tfl_l: max_isometric_force=233 optimal_fiber_length=0.09874247 tendon_slack_length=0.4417427
        pennation_angle=0.05235988
      MusclePoint P1: pelvis (-0.02781564 0.01770331 -0.124498)
      MusclePoint P2: femur_l (0.03169859 -0.1072793 -0.06436755)
      MusclePoint P3: femur_l (0.00582219 -0.4365565 -0.03849115)
      MusclePoint P4: tibia_l (0.00648937 -0.05267203 -0.02800805)
    Thelen2003Muscle pect_l: max_isometric_force=266 optimal_fiber_length=0.1061862 tendon_slack_length=0.03504143
        pennation_angle=0
      MusclePoint P1: pelvis (-0.03854836 -0.06353337 -0.04524465)
      MusclePoint P2: femur_l (-0.01315384 -0.08862668 -0.02727804)
    Thelen2003Muscle grac_l: max_isometric_force=162 optimal_fiber_length=0.3899336 tendon_slack_length=0.1395785
        pennation_angle=0.05235988
      MusclePoint P1: pelvis (-0.06619406 -0.09819546 -0.02802962)
      MuscleViaPoint P2: tibia_l (-0.02873708 -0.0345018 0.03559002) range=(-0.4363323 0.1745329)
          coordinate=knee_angle_l
      MusclePoint P3: tibia_l (-0.02101473 -0.05573285 0.03376054)
      MusclePoint P4: tibia_l (0.00648937 -0.09041852 0.02150113)
    Thelen2003Muscle glut_max1_l: max_isometric_force=573 optimal_fiber_length=0.1310003 tendon_slack_length=0.1153171
        pennation_angle=0.08726646
      MusclePoint P1: pelvis (-0.10688 0.05062815 -0.07022452)
      MusclePoint P2: pelvis (-0.1154662 0.00099271 -0.08888418)
      MusclePoint P3: femur_l (-0.04927298 -0.02673895 -0.04226479)
      MusclePoint P4: femur_l (-0.02986568 -0.06102518 -0.05067462)
    Thelen2003Muscle glut_max2_l: max_isometric_force=819 optimal_fiber_length=0.1424892 tendon_slack_length=0.123103
        pennation_angle=0
      MusclePoint P1: pelvis (-0.1206537 0.01455973 -0.05648058)
      MusclePoint P2: pelvis (-0.1230685 -0.04301739 -0.09169316)
      MusclePoint P3: femur_l (-0.04593061 -0.05714372 -0.03159077)
      MusclePoint P4: femur_l (-0.01681966 -0.1095434 -0.04517588)
    Thelen2003Muscle glut_max3_l: max_isometric_force=552 optimal_fiber_length=0.1433255 tendon_slack_length=0.1443209
        pennation_angle=0.08726646
      MusclePoint P1: pelvis (-0.1391676 -0.02597588 -0.0058186)
      MusclePoint P2: pelvis (-0.1367528 -0.08702748 -0.04042926)
      MusclePoint P3: femur_l (-0.03223768 -0.1122389 -0.01455548)
      MusclePoint P4: femur_l (-0.0064691 -0.1529942 -0.04431334)
    Thelen2003Muscle iliacus_l: max_isometric_force=1073 optimal_fiber_length=0.09196768 tendon_slack_length=0.09196768
        pennation_angle=0.1221731
      MusclePoint P1: pelvis (-0.06028212 0.0301949 -0.08567391)
      MusclePoint P2: pelvis (-0.02307535 -0.04549916 -0.08136012)
      MuscleViaPoint P3: pelvis (-0.02575853 -0.06659422 -0.08186172) range=(-1.570796 0.7853982)
          coordinate=hip_flexion_l
      MusclePoint P4: femur_l (0.00183291 -0.05854536 -0.00614565)
      MusclePoint P5: femur_l (-0.02080894 -0.06695519 -0.01390857)
    Thelen2003Muscle psoas_l: max_isometric_force=1113 optimal_fiber_length=0.09058239 tendon_slack_length=0.1449318
        pennation_angle=0.1396263
      MusclePoint P1: pelvis (-0.05786726 0.07337773 -0.02899269)
      MusclePoint P2: pelvis (-0.02128657 -0.04715367 -0.07614344)
      MuscleViaPoint P3: pelvis (-0.02575853 -0.06659422 -0.08186172) range=(-1.570796 0.7853982)
          coordinate=hip_flexion_l
      MusclePoint P4: femur_l (0.00172509 -0.0546639 -0.0040971)
      MusclePoint P5: femur_l (-0.02026985 -0.06436755 -0.01121311)
    Thelen2003Muscle quad_fem_l: max_isometric_force=381 optimal_fiber_length=0.0552034 tendon_slack_length=0.02453484
        pennation_angle=0
      MusclePoint P1: pelvis (-0.1022292 -0.09521733 -0.05216679)
      MusclePoint P2: femur_l (-0.04107879 -0.03870678 -0.03946151)
    Thelen2003Muscle gem_l: max_isometric_force=164 optimal_fiber_length=0.02415437 tendon_slack_length=0.03925085
        pennation_angle=0
      MusclePoint P1: pelvis (-0.1013348 -0.06783511 -0.07162901)
      MusclePoint P2: femur_l (-0.0153102 -0.00355801 -0.04776353)
    Thelen2003Muscle peri_l: max_isometric_force=444 optimal_fiber_length=0.02490668 tendon_slack_length=0.1101642
        pennation_angle=0.1745329
      MusclePoint P1: pelvis (-0.1248573 0.00024818 -0.02357537)
      MusclePoint P2: pelvis (-0.1067011 -0.0228323 -0.06591073)
      MusclePoint P3: femur_l (-0.01595711 -0.00388146 -0.04711662)
    Thelen2003Muscle rect_fem_l: max_isometric_force=1169 optimal_fiber_length=0.1205554 tendon_slack_length=0.3278262
        pennation_angle=0.08726646
      MusclePoint P1: pelvis (-0.02638461 -0.02572771 -0.09711048)
      MuscleViaPoint P2: femur_l (0.03601133 -0.4345079 -0.00204855) range=(-2.617994 -1.459968)
          coordinate=knee_angle_l
      MovingMusclePoint P3: tibia_l (0.06394735 0.02342184 -0.00132024) x_coordinate=knee_angle_l
          y_coordinate=knee_angle_l z_coordinate=knee_angle_l
        XAttachment:
          natCubicSpline: min_x=-1000000000000000000000000000000 max_x=1000000000000000000000000000000
              min_y=-1000000000000000000000000000000 max_y=1000000000000000000000000000000
              min_z=-1000000000000000000000000000000 max_z=1000000000000000000000000000000
              x=(-2.094395 -1.999973 -1.570796 -1.457524 -1.396263 -1.047198 -0.6981317 -0.5263913 -0.3490659 -0.1745329 0 0.00017453 0.00034907 0.02792527 0.08726646 0.1745329 2.094395)
              y=(0.01685126 0.01946142 0.02975169 0.03207516 0.0332705 0.03955218 0.04564991 0.04876779 0.05233783 0.05778774 0.06679457 0.06680465 0.06681474 0.06847181 0.07245807 0.07928218 0.06202545)
        YAttachment:
          natCubicSpline: min_x=-1000000000000000000000000000000 max_x=1000000000000000000000000000000
              min_y=-1000000000000000000000000000000 max_y=1000000000000000000000000000000
              min_z=-1000000000000000000000000000000 max_z=1000000000000000000000000000000
              x=(-2.094395 -1.999973 -1.570796 -1.457524 -1.396263 -1.047198 -0.6981317 -0.5263913 -0.3490659 -0.1745329 0 0.00017453 0.00034907 0.02792527 0.08726646 0.1745329 2.094395)
              y=(0.0253211 0.02569931 0.02716247 0.0273413 0.02737932 0.02695077 0.02621413 0.02578953 0.02532986 0.02462109 0.0226955 0.0226927 0.02268989 0.02219631 0.02073938 0.01725678 -0.07287275)
        ZAttachment:
          natCubicSpline: min_x=-1000000000000000000000000000000 max_x=1000000000000000000000000000000
              min_y=-1000000000000000000000000000000 max_y=1000000000000000000000000000000
              min_z=-1000000000000000000000000000000 max_z=1000000000000000000000000000000 x=(-2.0944 0.1745)
              y=(-0.00132024 -0.00132024)
    Thelen2003Muscle vas_med_l: max_isometric_force=1294 optimal_fiber_length=0.09578739 tendon_slack_length=0.1356091
        pennation_angle=0.08726646
      MusclePoint P1: femur_l (0.01509457 -0.2263107 -0.02026985)
      MusclePoint P2: femur_l (0.03838333 -0.298549 -0.00097037)
      MuscleViaPoint P3: femur_l (0.03989279 -0.4364486 0.01347729) range=(-2.617994 -1.210037) coordinate=knee_angle_l
      MuscleViaPoint P4: femur_l (0.02954223 -0.458767 0.0141242) range=(-2.617994 -1.780061) coordinate=knee_angle_l
      MovingMusclePoint P5: tibia_l (0.05763626 0.02393844 0.01376826) x_coordinate=knee_angle_l
          y_coordinate=knee_angle_l z_coordinate=knee_angle_l
        XAttachment:
          natCubicSpline: min_x=-1000000000000000000000000000000 max_x=1000000000000000000000000000000
              min_y=-1000000000000000000000000000000 max_y=1000000000000000000000000000000
              min_z=-1000000000000000000000000000000 max_z=1000000000000000000000000000000
              x=(-2.094395 -1.999973 -1.570796 -1.457524 -1.396263 -1.047198 -0.6981317 -0.5263913 -0.3490659 -0.1745329 0 0.00017453 0.00034907 0.02792527 0.08726646 0.1745329 2.094395)
              y=(0.01061116 0.01322132 0.02350999 0.02583319 0.02702847 0.03330764 0.03938907 0.04249136 0.04603713 0.05145681 0.06052266 0.06053293 0.06054321 0.06223505 0.06633949 0.07349242 0.06806608)
        YAttachment:
          natCubicSpline: min_x=-1000000000000000000000000000000 max_x=1000000000000000000000000000000
              min_y=-1000000000000000000000000000000 max_y=1000000000000000000000000000000
              min_z=-1000000000000000000000000000000 max_z=1000000000000000000000000000000
              x=(-2.094395 -1.999973 -1.570796 -1.457524 -1.396263 -1.047198 -0.6981317 -0.5263913 -0.3490659 -0.1745329 0 0.00017453 0.00034907 0.02792527 0.08726646 0.1745329 2.094395)
              y=(0.02424363 0.02462183 0.02609426 0.02627471 0.026313 0.02589933 0.02526448 0.02494911 0.02469662 0.02448244 0.02356901 0.02356755 0.02356607 0.02329302 0.02237122 0.01982164 -0.07097255)
        ZAttachment:
          natCubicSpline: min_x=-1000000000000000000000000000000 max_x=1000000000000000000000000000000
              min_y=-1000000000000000000000000000000 max_y=1000000000000000000000000000000
              min_z=-1000000000000000000000000000000 max_z=1000000000000000000000000000000 x=(-2.094395 2.094395)
              y=(0.01376826 0.01376826)
    Thelen2003Muscle vas_int_l: max_isometric_force=1365 optimal_fiber_length=0.09379739 tendon_slack_length=0.1466258
        pennation_angle=0.05235988
      MusclePoint P1: femur_l (0.03126732 -0.2074425 -0.03342369)
      MusclePoint P2: femur_l (0.03611914 -0.2246934 -0.03072823)
      MuscleViaPoint P3: femur_l (0.03698169 -0.4345079 -0.00593001) range=(-2.617994 -1.42) coordinate=knee_angle_l
      MovingMusclePoint P4: tibia_l (0.06394735 0.02342184 -0.00132024) x_coordinate=knee_angle_l
          y_coordinate=knee_angle_l z_coordinate=knee_angle_l
        XAttachment:
          natCubicSpline: min_x=-1000000000000000000000000000000 max_x=1000000000000000000000000000000
              min_y=-1000000000000000000000000000000 max_y=1000000000000000000000000000000
              min_z=-1000000000000000000000000000000 max_z=1000000000000000000000000000000
              x=(-2.094395 -1.999973 -1.570796 -1.457524 -1.396263 -1.047198 -0.6981317 -0.5263913 -0.3490659 -0.1745329 0 0.00017453 0.00034907 0.02792527 0.08726646 0.1745329 2.094395)
              y=(0.01685126 0.01946142 0.02975169 0.03207516 0.0332705 0.03955218 0.04564991 0.04876779 0.05233783 0.05778774 0.06679457 0.06680465 0.06681474 0.06847181 0.07245807 0.07928218 0.06202545)
        YAttachment:
          natCubicSpline: min_x=-1000000000000000000000000000000 max_x=1000000000000000000000000000000
              min_y=-1000000000000000000000000000000 max_y=1000000000000000000000000000000
              min_z=-1000000000000000000000000000000 max_z=1000000000000000000000000000000
              x=(-2.094395 -1.999973 -1.570796 -1.457524 -1.396263 -1.047198 -0.6981317 -0.5263913 -0.3490659 -0.1745329 0 0.00017453 0.00034907 0.02792527 0.08726646 0.1745329 2.094395)
              y=(0.0253211 0.02569931 0.02716247 0.0273413 0.02737932 0.02695077 0.02621413 0.02578953 0.02532986 0.02462109 0.0226955 0.0226927 0.02268989 0.02219631 0.02073938 0.01725678 -0.07287275)
        ZAttachment:
          natCubicSpline: min_x=-1000000000000000000000000000000 max_x=1000000000000000000000000000000
              min_y=-1000000000000000000000000000000 max_y=1000000000000000000000000000000
              min_z=-1000000000000000000000000000000 max_z=1000000000000000000000000000000 x=(-2.0944 0.1745)
              y=(-0.00132024 -0.00132024)
    Thelen2003Muscle vas_lat_l: max_isometric_force=1871 optimal_fiber_length=0.09075394 tendon_slack_length=0.1696234
        pennation_angle=0.08726646
      MusclePoint P1: femur_l (0.00517528 -0.1998952 -0.0376286)
      MusclePoint P2: femur_l (0.02900313 -0.2793573 -0.0440977)
      MuscleViaPoint P3: femur_l (0.03892242 -0.4345079 -0.02210276) range=(-2.617994 -1.210037)
          coordinate=knee_angle_l
      MuscleViaPoint P4: femur_l (0.02727804 -0.4574732 -0.01983857) range=(-2.617994 -1.920037)
          coordinate=knee_angle_l
      MovingMusclePoint P5: tibia_l (0.06208726 0.02180305 -0.01556003) x_coordinate=knee_angle_l
          y_coordinate=knee_angle_l z_coordinate=knee_angle_l
        XAttachment:
          natCubicSpline: min_x=-1000000000000000000000000000000 max_x=1000000000000000000000000000000
              min_y=-1000000000000000000000000000000 max_y=1000000000000000000000000000000
              min_z=-1000000000000000000000000000000 max_z=1000000000000000000000000000000
              x=(-2.094395 -1.999973 -1.570796 -1.457524 -1.396263 -1.047198 -0.6981317 -0.5263913 -0.3490659 -0.1745329 0 0.00017453 0.00034907 0.02792527 0.08726646 0.1745329 2.094395)
              y=(0.0154552 0.01806536 0.02835261 0.03067555 0.0318708 0.03814765 0.04421257 0.04729574 0.05080139 0.05610515 0.06484577 0.06485553 0.06486529 0.06647032 0.07033947 0.07699278 0.06313784)
        YAttachment:
          natCubicSpline: min_x=-1000000000000000000000000000000 max_x=1000000000000000000000000000000
              min_y=-1000000000000000000000000000000 max_y=1000000000000000000000000000000
              min_z=-1000000000000000000000000000000 max_z=1000000000000000000000000000000
              x=(-2.094395 -1.999973 -1.570796 -1.457524 -1.396263 -1.047198 -0.6981317 -0.5263913 -0.3490659 -0.1745329 0 0.00017453 0.00034907 0.02792527 0.08726646 0.1745329 2.094395)
              y=(0.02328792 0.02366613 0.02513136 0.02531055 0.02534864 0.02492343 0.02420993 0.02381067 0.02340056 0.02281783 0.02118389 0.0211815 0.0211791 0.02075518 0.0194767 0.01633947 -0.07067151)
        ZAttachment:
          natCubicSpline: min_x=-1000000000000000000000000000000 max_x=1000000000000000000000000000000
              min_y=-1000000000000000000000000000000 max_y=1000000000000000000000000000000
              min_z=-1000000000000000000000000000000 max_z=1000000000000000000000000000000 x=(-2.094395 2.094395)
              y=(-0.01556003 -0.01556003)
    Thelen2003Muscle med_gas_l: max_isometric_force=1558 optimal_fiber_length=0.06488398 tendon_slack_length=0.4217459
        pennation_angle=0.296706
      MusclePoint P1: femur_l (-0.02048548 -0.4236183 0.02533731)
      MuscleViaPoint P2: femur_l (-0.0323455 -0.4336454 0.02781713) range=(-0.7853982 0.1745329)
          coordinate=knee_angle_l
      MusclePoint P3: calcn_l (0 0.03342889 0.00571526)
    Thelen2003Muscle lat_gas_l: max_isometric_force=683 optimal_fiber_length=0.06921136 tendon_slack_length=0.4109424
        pennation_angle=0.1396263
      MusclePoint P1: femur_l (-0.02372004 -0.4254512 -0.02932659)
      MuscleViaPoint P2: femur_l (-0.0323455 -0.4332141 -0.02954223) range=(-0.7853982 0.1745329)
          coordinate=knee_angle_l
      MusclePoint P3: calcn_l (0 0.03342889 0.00571526)
    Thelen2003Muscle soleus_l: max_isometric_force=3549 optimal_fiber_length=0.05406552 tendon_slack_length=0.2703276
        pennation_angle=0.4363323
      MusclePoint P1: tibia_l (-0.00259575 -0.1658033 -0.00669553)
      MusclePoint P2: calcn_l (0 0.03342889 0.00571526)
    Thelen2003Muscle tib_post_l: max_isometric_force=1588 optimal_fiber_length=0.03348227 tendon_slack_length=0.3348227
        pennation_angle=0.2094395
      MusclePoint P1: tibia_l (-0.01016668 -0.1457944 -0.00179176)
      MusclePoint P2: tibia_l (-0.01557448 -0.4381404 0.02159543)
      MusclePoint P3: calcn_l (0.04496725 0.03601693 0.03084085)
      MusclePoint P4: calcn_l (0.08324872 0.01714579 0.03030167)
    Thelen2003Muscle flex_dig_l: max_isometric_force=310 optimal_fiber_length=0.0367154 tendon_slack_length=0.4319459
        pennation_angle=0.1221731
      MusclePoint P1: tibia_l (-0.00897696 -0.2212874 0.00169746)
      MusclePoint P2: tibia_l (-0.01665604 -0.4381404 0.01848342)
      MusclePoint P3: calcn_l (0.04701612 0.03396807 0.03019384)
      MusclePoint P4: calcn_l (0.07634727 0.01897898 0.02836064)
      MusclePoint P5: calcn_l (0.1787906 -0.00873465 -0.01250888)
      MusclePoint P6: toes_l (-0.00204887 -0.00841114 -0.01585176)
      MusclePoint P7: toes_l (0.03073301 -0.00765629 -0.02318455)
      MusclePoint P8: toes_l (0.04755529 -0.00647011 -0.0260961)
    Thelen2003Muscle flex_hal_l: max_isometric_force=322 optimal_fiber_length=0.04630623 tendon_slack_length=0.4092178
        pennation_angle=0.1745329
      MusclePoint P1: tibia_l (-0.00854433 -0.2524364 -0.02300998)
      MusclePoint P2: tibia_l (-0.02011704 -0.4411688 0.01640875)
      MusclePoint P3: calcn_l (0.04033034 0.0297625 0.02598827)
      MusclePoint P4: calcn_l (0.1119329 0.00733279 0.02760579)
      MusclePoint P5: calcn_l (0.1861234 -0.00571526 0.02900765)
      MusclePoint P6: toes_l (0.01671445 -0.00690145 0.02857631)
      MusclePoint P7: toes_l (0.06060334 -0.01099918 0.01951816)
    Thelen2003Muscle tib_ant_l: max_isometric_force=905 optimal_fiber_length=0.1058508 tendon_slack_length=0.2408646
        pennation_angle=0.08726646
      MusclePoint P1: tibia_l (0.01935995 -0.1756455 -0.01084487)
      MusclePoint P2: tibia_l (0.03558336 -0.4273248 0.01669166)
      MusclePoint P3: calcn_l (0.1257358 0.01919465 0.03288972)
    Thelen2003Muscle per_brev_l: max_isometric_force=435 optimal_fiber_length=0.05423394 tendon_slack_length=0.1746333
        pennation_angle=0.08726646
      MusclePoint P1: tibia_l (-0.00757093 -0.2861811 -0.03064853)
      MusclePoint P2: tibia_l (-0.02141491 -0.4525252 -0.0266878)
      MusclePoint P3: tibia_l (-0.01557448 -0.4645305 -0.02725362)
      MusclePoint P4: calcn_l (0.05079035 0.02911549 -0.02512559)
      MusclePoint P5: calcn_l (0.07300438 0.02361589 -0.03698745)
    Thelen2003Muscle per_long_l: max_isometric_force=943 optimal_fiber_length=0.05301707 tendon_slack_length=0.3732834
        pennation_angle=0.1745329
      MusclePoint P1: tibia_l (0.00054078 -0.1695888 -0.03413775)
      MusclePoint P2: tibia_l (-0.02238832 -0.4547965 -0.02697071)
      MusclePoint P3: tibia_l (-0.01752129 -0.4671263 -0.02725362)
      MusclePoint P4: calcn_l (0.04723179 0.02480208 -0.02383156)
      MusclePoint P5: calcn_l (0.07343573 0.01143052 -0.03062518)
      MusclePoint P6: calcn_l (0.09187553 0.00744062 -0.01272455)
      MusclePoint P7: calcn_l (0.1297257 0.00916599 0.01984166)
    Thelen2003Muscle per_tert_l: max_isometric_force=180 optimal_fiber_length=0.08580451 tendon_slack_length=0.1086133
        pennation_angle=0.2268928
      MusclePoint P1: tibia_l (0.00108156 -0.3032698 -0.02178404)
      MusclePoint P2: tibia_l (0.02476775 -0.4400872 -0.01499421)
      MusclePoint P3: calcn_l (0.09241471 0.02458641 -0.0322427)
    Thelen2003Muscle ext_dig_l: max_isometric_force=512 optimal_fiber_length=0.1101588 tendon_slack_length=0.3725959
        pennation_angle=0.1396263
      MusclePoint P1: tibia_l (0.003461 -0.1493636 -0.02602768)
      MusclePoint P2: tibia_l (0.03125712 -0.4333816 -0.00678983)
      MusclePoint P3: calcn_l (0.09942399 0.04184003 0.00010784)
      MusclePoint P4: calcn_l (0.1742616 0.00593093 -0.01401857)
      MusclePoint P5: toes_l (0.00032351 0.00506825 -0.01649878)
      MusclePoint P6: toes_l (0.04777096 -0.00043134 -0.02695878)
    Thelen2003Muscle ext_hal_l: max_isometric_force=162 optimal_fiber_length=0.119797 tendon_slack_length=0.3291718
        pennation_angle=0.1047198
      MusclePoint P1: tibia_l (0.00129787 -0.1911119 -0.02150113)
      MusclePoint P2: tibia_l (0.0352589 -0.4310021 0.00801577)
      MusclePoint P3: calcn_l (0.1046001 0.04194787 0.02275321)
      MusclePoint P4: calcn_l (0.1394308 0.03332106 0.02771363)
      MusclePoint P5: calcn_l (0.1869861 0.01498908 0.03019384)
      MusclePoint P6: toes_l (0.03213487 0.00442124 0.02641961)
      MusclePoint P7: toes_l (0.06071118 0.00366639 0.02005733)
    Thelen2003Muscle ercspn_r: max_isometric_force=2500 optimal_fiber_length=0.1159293 tendon_slack_length=0.02898233
        pennation_angle=0
      MusclePoint P1: pelvis (-0.1252151 0.0363166 0.04373984)
      MusclePoint P2: torso (-0.0553861 0.1107722 0.02426918)
    Thelen2003Muscle ercspn_l: max_isometric_force=2500 optimal_fiber_length=0.1159293 tendon_slack_length=0.02898233
        pennation_angle=0
      MusclePoint P1: pelvis (-0.1252151 0.0363166 -0.04373984)
      MusclePoint P2: torso (-0.0553861 0.1107722 -0.02426918)
    Thelen2003Muscle intobl_r: max_isometric_force=900 optimal_fiber_length=0.099917 tendon_slack_length=0.099917
        pennation_angle=0
      MusclePoint P1: pelvis (-0.03577574 0.05790802 0.1160711)
      MusclePoint P2: torso (0.0704914 0.1611232 0.0151053)
    Thelen2003Muscle intobl_l: max_isometric_force=900 optimal_fiber_length=0.099917 tendon_slack_length=0.099917
        pennation_angle=0
      MusclePoint P1: pelvis (-0.03577574 0.05790802 -0.1160711)
      MusclePoint P2: torso (0.0704914 0.1611232 -0.0151053)
    Thelen2003Muscle extobl_r: max_isometric_force=900 optimal_fiber_length=0.1102729 tendon_slack_length=0.1286517
        pennation_angle=0
      MusclePoint P1: pelvis (-0.0268318 -0.05261357 0.01003207)
      MusclePoint P2: torso (0.0654563 0.1107722 0.1107722)
    Thelen2003Muscle extobl_l: max_isometric_force=900 optimal_fiber_length=0.1102729 tendon_slack_length=0.1286517
        pennation_angle=0
      MusclePoint P1: pelvis (-0.0268318 -0.05261357 -0.01003207)
      MusclePoint P2: torso (0.0654563 0.1107722 -0.1107722)
    ObjectGroup R_hip_abd: members=(glut_max1_r glut_med1_r glut_med2_r glut_med3_r glut_min1_r glut_min2_r glut_min3_r peri_r sar_r tfl_r)
    ObjectGroup R_hip_flex: members=(add_brev_r add_long_r glut_med1_r glut_min1_r grac_r iliacus_r pect_r psoas_r rect_fem_r sar_r tfl_r)
    ObjectGroup R_hip_inrot: members=(glut_med1_r glut_min1_r iliacus_r psoas_r tfl_r)
    ObjectGroup R_hip_exrot: members=(gem_r glut_med3_r glut_min3_r peri_r quad_fem_r)
    ObjectGroup R_hip_ext: members=(add_long_r add_mag1_r add_mag2_r add_mag3_r bifemlh_r glut_max1_r glut_max2_r glut_max3_r glut_med3_r glut_min3_r semimem_r semiten_r)
    ObjectGroup R_hip_add: members=(add_brev_r add_long_r add_mag1_r add_mag2_r add_mag3_r bifemlh_r grac_r pect_r semimem_r semiten_r)
    ObjectGroup R_knee_bend: members=(bifemlh_r bifemsh_r grac_r lat_gas_r med_gas_r sar_r semimem_r semiten_r)
    ObjectGroup R_knee_ext: members=(rect_fem_r vas_int_r vas_lat_r vas_med_r)
    ObjectGroup R_ankle_pf: members=(flex_dig_r flex_hal_r lat_gas_r med_gas_r per_brev_r per_long_r soleus_r tib_post_r)
    ObjectGroup R_inverter: members=(ext_hal_r flex_dig_r flex_hal_r tib_ant_r tib_post_r)
    ObjectGroup R_ankle_df: members=(ext_dig_r ext_hal_r per_tert_r tib_ant_r)
    ObjectGroup R_everter: members=(ext_dig_r per_brev_r per_long_r per_tert_r)
    ObjectGroup L_hip_abd: members=(glut_max1_l glut_med1_l glut_med2_l glut_med3_l glut_min1_l glut_min2_l glut_min3_l peri_l sar_l tfl_l)
    ObjectGroup L_hip_flex: members=(add_brev_l add_long_l glut_med1_l glut_min1_l grac_l iliacus_l pect_l psoas_l rect_fem_l sar_l tfl_l)
    ObjectGroup L_hip_inrot: members=(glut_med1_l glut_min1_l iliacus_l psoas_l tfl_l)
    ObjectGroup L_hip_exrot: members=(gem_l glut_med3_l glut_min3_l peri_l quad_fem_l)
    ObjectGroup L_hip_ext: members=(add_long_l add_mag1_l add_mag2_l add_mag3_l bifemlh_l glut_max1_l glut_max2_l glut_max3_l glut_med3_l glut_min3_l semimem_l semiten_l)
    ObjectGroup L_hip_add: members=(add_brev_l add_long_l add_mag1_l add_mag2_l add_mag3_l bifemlh_l grac_l pect_l semimem_l semiten_l)
    ObjectGroup L_knee_bend: members=(bifemlh_l bifemsh_l grac_l lat_gas_l med_gas_l sar_l semimem_l semiten_l)
    ObjectGroup L_knee_ext: members=(rect_fem_l vas_int_l vas_lat_l vas_med_l)
    ObjectGroup L_ankle_pf: members=(flex_dig_l flex_hal_l lat_gas_l med_gas_l per_brev_l per_long_l soleus_l tib_post_l)
    ObjectGroup L_inverter: members=(ext_hal_l flex_dig_l flex_hal_l tib_ant_l tib_post_l)
    ObjectGroup L_ankle_df: members=(ext_dig_l ext_hal_l per_tert_l tib_ant_l)
    ObjectGroup L_everter: members=(ext_dig_l per_brev_l per_long_l per_tert_l)
    ObjectGroup back_ext: members=(ercspn_l ercspn_r)
    ObjectGroup back_rlb: members=(ercspn_r extobl_r intobl_r)
    ObjectGroup back_introt: members=(ercspn_r extobl_l intobl_r)
    ObjectGroup back_llb: members=(ercspn_l extobl_l intobl_l)
    ObjectGroup back_extrot: members=(ercspn_l extobl_r intobl_l)
    ObjectGroup back_flex: members=(extobl_l extobl_r intobl_l intobl_r)
