# OpenSim document version 40000
AnalyzeTool analysis_run200_cycle3:
  model_file: ../../../model.osim
  replace_force_set: false
  results_directory: results_run200_cycle3
  output_precision: 8
  initial_time: 1.7656
  final_time: 2.5656
  solve_for_equilibrium_for_auxiliary_states: false
  maximum_number_of_integrator_steps: 20000
  maximum_integrator_step_size: 1
  minimum_integrator_step_size: 1e-8
  integrator_error_tolerance: 1e-5
  external_loads_file: run200_external_forces.xml
  coordinates_file: ../subject02_run200_cycle3_coordinates.sto
  AnalysisSet Analyses:
    BodyKinematics: start_time=1.7656 end_time=2.5656 step_interval=1 in_degrees=false bodies=center_of_mass
        express_results_in_body_local_frame=false
