# OpenSim document version 40000
AnalyzeTool analysis_squatsAsym1:
  model_file: ../Models/final.osim
  replace_force_set: false
  results_directory: results_squatsAsym1
  output_precision: 8
  initial_time: 0
  final_time: 13.17
  solve_for_equilibrium_for_auxiliary_states: false
  maximum_number_of_integrator_steps: 20000
  maximum_integrator_step_size: 1
  minimum_integrator_step_size: 1e-8
  integrator_error_tolerance: 1e-5
  external_loads_file: ../ID/squatsAsym1_external_forces.xml
  coordinates_file: ../IK/squatsAsym1_ik.mot
  AnalysisSet Analyses:
    BodyKinematics: start_time=0 end_time=13.17 step_interval=1 in_degrees=false bodies=center_of_mass
        express_results_in_body_local_frame=false
