# OpenSim document version 40000
InverseKinematicsTool STSweakLegs1:
  results_directory: C:/MyDriveSym/Projects/mobilecap/Data\subject11\OpenSimData\Mocap\IK\LaiArnoldModified2017_poly_withArms_weldHand
  model_file: C:/MyDriveSym/Projects/mobilecap/Data\subject11\OpenSimData\Mocap\Model\LaiArnoldModified2017_poly_withArms_weldHand\LaiArnoldModified2017_poly_withArms_weldHand_scaled.osim
  constraint_weight: Inf
  accuracy: 1e-5
  time_range: -Inf Inf
  output_motion_file: C:/MyDriveSym/Projects/mobilecap/Data\subject11\OpenSimData\Mocap\IK\LaiArnoldModified2017_poly_withArms_weldHand\STSweakLegs1.mot
  report_errors: true
  marker_file: C:/MyDriveSym/Projects/mobilecap/Data\subject11\MarkerData\Mocap\STSweakLegs1.trc
  report_marker_locations: false
  IKTaskSet:
    IKMarkerTask C7: apply=true weight=5
    IKMarkerTask R_Shoulder: apply=true weight=5
    IKMarkerTask L_Shoulder: apply=true weight=5
    IKMarkerTask R_Sternum: apply=true weight=5
    IKMarkerTask L_Sternum: apply=true weight=5
    IKMarkerTask r.ASIS: apply=true weight=25
    IKMarkerTask L.ASIS: apply=true weight=25
    IKMarkerTask r.PSIS: apply=true weight=25
    IKMarkerTask L.PSIS: apply=true weight=25
    IKMarkerTask r_thigh1: apply=true weight=4
    IKMarkerTask r_thigh2: apply=true weight=4
    IKMarkerTask r_thigh3: apply=true weight=4
    IKMarkerTask r_thigh4: apply=true weight=4
    IKMarkerTask r_thigh5: apply=true weight=4
    IKMarkerTask r_knee: apply=true weight=20
    IKMarkerTask r_mknee: apply=true weight=0
    IKMarkerTask r_shank_antsup: apply=true weight=4
    IKMarkerTask r_sh2: apply=true weight=4
    IKMarkerTask r_sh3: apply=true weight=4
    IKMarkerTask r_sh4: apply=true weight=4
    IKMarkerTask r_ankle: apply=true weight=20
    IKMarkerTask r_mankle: apply=true weight=0
    IKMarkerTask r_toe: apply=true weight=7
    IKMarkerTask r_5meta: apply=true weight=7
    IKMarkerTask r_calc: apply=true weight=7
    IKMarkerTask L_thigh1: apply=true weight=4
    IKMarkerTask L_thigh2: apply=true weight=4
    IKMarkerTask L_thigh3: apply=true weight=4
    IKMarkerTask L_thigh4: apply=true weight=4
    IKMarkerTask L_knee: apply=true weight=20
    IKMarkerTask L_mknee: apply=true weight=0
    IKMarkerTask L_ankle: apply=true weight=20
    IKMarkerTask L_shank_antsup: apply=true weight=4
    IKMarkerTask L_sh2: apply=true weight=4
    IKMarkerTask L_sh3: apply=true weight=4
    IKMarkerTask L_mankle: apply=true weight=0
    IKMarkerTask L_toe: apply=true weight=7
    IKMarkerTask L_calc: apply=true weight=7
    IKMarkerTask L_5meta: apply=true weight=7
    IKMarkerTask R_elbow_med: apply=true weight=5
    IKMarkerTask R_elbow_lat: apply=true weight=5
    IKMarkerTask R_wrist_radius: apply=true weight=5
    IKMarkerTask R_wrist_ulna: apply=true weight=5
    IKMarkerTask L_elbow_med: apply=true weight=5
    IKMarkerTask L_elbow_lat: apply=true weight=5
    IKMarkerTask L_wrist_radius: apply=true weight=5
    IKMarkerTask L_wrist_ulna: apply=true weight=5
